# Prime Express Premium
# Definitions for functions that are 'Premium Features' in Prime.
#
# This worksheet contains, where possible, definitions of Mathcad Prime functions that are considered 'Premium Features' and therefore are not usable/accessible in Prime Express.
# The function definitions reside in a collapsed region below this text.
# Note that it is not possible to define functions for symbolics, solve-blocks or programming and their associated keywords. Such 'Premium Features' can only be used with a 'full' Prime licensed version. But many of the other Premium Feature functions can be implemented.
#
# The functions implemented here are designed to give the same results as the corresponding functions in 'full' Prime would give, but might take longer to calculate. In some cases the precision or accuracy of the result is less compared with 'full' Prime. Reducing TOL (at the worksheet level, use the 'Calculation' tab of the ribbon) to a value less than it's default 0.001 may help in such cases, at the expense of calculation time of course.
# For this worksheet the value of TOL = 0.001.
#
# Some Prime functions accept a variable number of parameters or arguments. Prime has no provision for user definition of such functions. In such cases the function is defined with the least number of parameters labelled as a 'Function' and a function definition labelled as 'Variable' may be provided that will accept the next number of parameters.
# Example: signum(z) accepts one parameter while signum(z, x) accepts two.
# Select each of the two 'signum' s above and check its label from the ribbon to see why one is in upright font, the other is in italic font.
#
# All functions are designed to be ORIGIN-aware; that is, they should give the same result irrespective of the value of ORIGIN. For that to function correctly ORIGIN should (also) be set at the worksheet level; if it is redefined somewhere on the sheet beyond (below) the definition area, then that may have an effect on the results of functions called beyond that redefinition of ORIGIN.
# For this worksheet the value of ORIGIN = 0.
#
# Following the collapsed area with the function definitions is a number of collapsed areas which demonstrate usage and - hopefully - correct functioning of the implemented functions.
# You can strip this text block and those collapsed areas out (be sure to keep the first collapsed area in) to create an 'empty' sheet for working with Prime Express with many of the Premium Feature functions usable/accessible.
# If you get a Prime worksheet that was created (and working) in a fully licensed Prime and which uses Premium Feature functions, then open that sheet together with this sheet in Prime and copy the collapsed function definitions area over to it. Copy it as a collapsed area, and be sure to paste it at the very beginning (before any definitions) of the other sheet.
#
# Success!
# Luc Meekes
# Definitions of Premium Feature functions
# General information
#
# The Premium Feature functions that are implemented mostly start at the far left of this page and have their name labelled as a 'Function'. Exceptions exist for functions with a small definition (see Im and Re, below) and/or functions with a common interest (see distribution functions dbeta, pbeta and qbeta etc.) for which more function definitions are on the same line.
# Wherever possible some error checking is implemented.
#
# Auxiliary functions are used to implement part(s) of Premium Feature functions and start on the first gridpoint from the left margin, and are labelled as 'Variable'. Their names usually end in '_Premium'. They are not designed to be called separately.
# Version history (Latest first):
# Version  Date  ID  Description
#
# 1.0.0  2019-04-01  LM  First publication
# PEP utility functions
# These functions are used throughout the implementation of PEP functions.
# They are not intended to be called from a worksheet directly, but used to facilitate implementation of the PEP functions.
# The abs_Pep() function calculates the abolute values of the elements of an array, and returns the array with absolute values. Parameters:
# x  is the array
abs_Pep(x) := vectorize(|x|)
# The margin_Pep() function can be used to set small values to 0. Parameters:
# v  is the value to be checked
# m  is the threshold
# d  is the default value (if |v|<m)
margin_Pep(v, m, d) := if((v - conj(v))/2i == 0, if(|v| < m, d, v), if(|(v - conj(v))/2i| < m and |(v + conj(v))/2| < m, d + 1i*d, if(|(v - conj(v))/2i| < m, (v + conj(v))/2 + 1i*d, if(|(v + conj(v))/2| < m, d + (v - conj(v))/2, v))))
# The largest_Pep() function determines the largest in absolute value of a and b.
largest_Pep(a, b) := if(|a| > |b|, a, b)
# The rowOp_Pep() and colOp_Pep() functions facilitate vector and matrix operations.
# The first argument is the matrix (or vector) to be operated upon.
# The second and third arguments point the row and column index,
# but these indexes must be 0-based!
# The last argument is the function to execute for the element indexed.
# This function must be defined as a function of three arguments:
# the matrix and the row and column indexes; this function must implement the ORIGIN-awareness (since the indexes are 0-based).
rowOp_Pep(M, r, c, f) := if(r == 0, f(M, r, c), stack(rowOp_Pep(M, r - 1, c, f), f(M, r, c)))
colOp_Pep(M, r, c, f) := if(c == 0, rowOp_Pep(M, r, c, f), augment(colOp_Pep(M, r, c - 1, f), rowOp_Pep(M, r, c, f)))
# The removeFirst() and removeLast() functions remove the first and last element from a vector respectively
removeFirst_Pep(v) := submatrix(v, ORIGIN + 1, last(v), ORIGIN, ORIGIN)
removeLast_Pep(v) := submatrix(v, ORIGIN, last(v) - 1, ORIGIN, ORIGIN)
# The removeTrail_Pep() function removes the trailing 0-elements from a vector v.
removeTrail_PEP(v, l) := if(l == 0, 0, if(v[ORIGIN + l] == 0, removeTrail_PEP(submatrix(v, ORIGIN, ORIGIN + l - 1, ORIGIN, ORIGIN), l - 1), submatrix(v, ORIGIN, ORIGIN + l, ORIGIN, ORIGIN)))
removeTrail_Pep(v) := if(v[last(v)] ≠ 0, v, removeTrail_PEP(v, length(v)))
# The unique_Pep() function removes duplicate elements from a vector. It returns the vector with unique elements sorted.
unique_PEP(V, v) := if(v == ORIGIN + 1, if(V[v] == V[v - 1], V[v], [V[v - 1]; V[v]]), if(V[v] == V[v - 1], unique_PEP(V, v - 1), stack(unique_PEP(V, v - 1), V[v])))
unique_Pep(V) := if(rows(V) == cols(V) == 1, V, if(cols(V) == 1, if(IsArray(unique_PEP(sort(V), last(V))), unique_PEP(sort(V), last(V)), [unique_PEP(sort(V), last(V))]), error("Must be vector.")))
# The ditch_Pep() function deletes those entries form a vector (T) that exist in another vector (S). It is sort of the opposite of the stack function.
ditch_PEP(T, S, t) := if(t == ORIGIN, if(sum(vectorize(T[t] == S)), NaN, [T[t]]), if(sum(vectorize(T[t] == S)), ditch_PEP(T, S, t - 1), stack(ditch_PEP(T, S, t - 1), T[t])))
ditch_Pep(T, S) := if(IsNaN(ditch_PEP(T, S, last(T))), error("No data left."), if(IsNaN(ditch_PEP(T, S, last(T))[ORIGIN]), removeFirst_Pep(ditch_PEP(T, S, last(T))), ditch_PEP(T, S, last(T))))
# Below this line you find the implementation of PEP functions.
# For help on usage of these functions, consult Prime help documentation.
# Auxiliary functions (on an indented position) are preceded by help information in rare cases only.
# Complex number functions
Im(z) := (z - conj(z))/2i
Re(z) := (z + conj(z))/2
arg(z) := atan2(Re(z), Im(z))
csgn(z) := if(z == 0, 0, if(Re(z) > 0 or (Re(z) == 0 and Im(z) > 0), 1, -1))
signum_Premium(z, x, i) := if(i == last(z), if(z[i] == 0, x, z[i]/|z[i]|), stack(if(z[i] == 0, x, z[i]/|z[i]|), signum_Premium(z, x, i + 1)))
signum(z) := if(IsScalar(z), if(z == 0, 1, z/|z|), if(cols(z) == 1, signum_Premium(z, 1, ORIGIN), error("Must be vector.")))
signum(z, x) := if(IsScalar(z), if(z == 0, x, z/|z|), if(cols(z) == 1, signum_Premium(z, x, ORIGIN), error("Must be vector.")))
# Matrix functions
lsolve(M, v) := M^-1*v
order(v) := ORIGIN + csort(augment(matrix(length(v), 1, max), csort(augment(matrix(length(v), 1, max), v), ORIGIN + 1)), ORIGIN + 1)[:, ORIGIN]
# Special functions
erf(x) := 2/sqrt(π)*if(Im(x) == 0, vectorize(integral(e^(-t^2), t = 0 .. x)), sum((-1)^n*x^(2*n + 1)/(n!*(2*n + 1)), n = 0 .. 23))
erfc(x) := 1 - erf(x)
ΓInt_Premium(z) := integral(t^(z - 1)*e^(-t), t = 0 .. ∞)
ΓProd_Premium(z) := e^(-γ*z)/z*product(e^(z/n)/(1 + z/n), n = 1 .. 1/sqrt(TOL))
Γ_Premium(z) := if(z ≠ 0 and z ≠ -|floor(z)|, if(Im(z) == 0 and z == floor(z), (z - 1)!, ΓProd_Premium(z)), error("Cannot accept 0 or negative integer."))
Γ(z) := vectorize(Γ_Premium(z))
lnΓ(z) := ln(Γ(z))
Psi(z) := if(Im(z) == 0, d/dz(lnΓ(z)), -γ + sum((z - 1)/((n + 1)*(n + z)), n = 0 .. 1/TOL))
ibeta(a, x, y) := Γ(x + y)/(Γ(x)*Γ(y))*integral(t^(x - 1)*(1 - t)^(y - 1), t = 0 .. a)
Her(n, x) := if(n ≥ 0, if(n == floor(n), n!*sum((-1)^m*(2*x)^(n - 2*m)/(m!*(n - 2*m)!), m = 0 .. floor(n/2)), error("Must be integer.")), error("Cannot be negative."))
Lag(n, x) := if(n ≥ 0, if(n == floor(n), e^x/n!*d^n/dx^n(e^(-x)*x^n), error("Must be integer.")), error("Cannot be negative."))
Leg(n, x) := if(n ≥ 0, if(n == floor(n), 1/(2^n*n!)*d^n/dx^n((x^2 - 1)^n), error("Must be integer.")), error("Cannot be negative."))
Jac_Premium(n, a, b, x) := if(n == 0, 1, if(n == 1, 1/2*(a - b + (a + b + 2)*x), ((2*n + a + b - 1)*((2*n + a + b)*(2*n + a + b - 2)*x + a^2 - b^2)*Jac_Premium(n - 1, a, b, x) - 2*(n + a - 1)*(n + b - 1)*(2*n + a + b)*Jac_Premium(n - 2, a, b, x))/(2*n*(n + a + b)*(2*n + a + b - 2))))
Jac(n, a, b, x) := if(n ≥ 0, if(n == floor(n), if(a > -1 and b > -1, Jac_Premium(n, a, b, x), error("Must be >-1.")), error("Must be integer.")), error("Cannot be negative."))
Tcheb_Premium(n, x) := if(n == 0, 1, if(n == 1, x, 2*x*Tcheb_Premium(n - 1, x) - Tcheb_Premium(n - 2, x)))
Tcheb(n, x) := if(n == floor(n), vectorize(Tcheb_Premium(n, x)), error("Must be integer."))
# An alternative implementation is:
Tcheb(n, x) := if(|x| > 1, cosh(n*acosh(x)), cos(n*acos(x)))  # disabled
Ucheb_Premium(n, x) := if(n == 0, 1, if(n == 1, 2*x, 2*x*Ucheb_Premium(n - 1, x) - Ucheb_Premium(n - 2, x)))
Ucheb(n, x) := if(n == floor(n), vectorize(Ucheb_Premium(n, x)), error("Must be integer."))
pochhammer(q, n) := if(n == 0, 1, pochhammer(q, n - 1)*(q + n - 1))
fhyper(a, b, c, x) := if(a == 0 and b == 0, if(IsArray(x), matrix(length(x), 1, max)*0 + 1, 1), sum(pochhammer(a, n)*pochhammer(b, n)/pochhammer(c, n)*x^n/n!, n = 0 .. 1/sqrt(TOL)))
mhyper(a, b, x) := if(a == 0 and b == 0, if(IsArray(x), matrix(length(x), 1, max)*0 + 1, 1), sum(pochhammer(a, n)/pochhammer(b, n)*x^n/n!, n = 0 .. 1/sqrt(TOL)))
# Bessel functions
Ai_Premium(z) := if(Im(z) == 0, 1/π*integral(cos(t^3/3 + z*t), t = 0 .. min(1/sqrt(TOL), 32)), error("Complex argument not yet implemented."))
Bi_Premium(z) := if(Im(z) == 0, 1/π*integral(e^(-t^3/3 + z*t) + sin(t^3/3 + z*t), t = 0 .. min(1/sqrt(TOL), 32)), error("Complex argument not yet implemented."))
Ai(z) := vectorize(Ai_Premium(z))
Ai.sc(z) := vectorize(Ai(z)*e^(2/3*z^(3/2)))
DAi_Premium(z) := d/dz(Ai(z))
DAi(z) := vectorize(DAi_Premium(z))
DAi.sc(z) := vectorize(DAi(z)*e^(2/3*z^(3/2)))
Bi(z) := vectorize(Bi_Premium(z))
Bi.sc(z) := vectorize(Bi(z)*e^(-2/3*|Re(z^(3/2))|))
DBi_Premium(z) := d/dz(Bi(z))
DBi(z) := vectorize(DBi_Premium(z))
DBi.sc(z) := vectorize(DBi(z)*e^(-2/3*|Re(z^(3/2))|))
JnSum_Premium(m, z) := (z/2)^m*sum((-1)^k*(z/2)^(2*k)/(k!*Γ(m + k + 1)), k = 0 .. -4*ln(TOL))
JnInt_Premium(m, z) := 1/π*integral(cos(z*sin(τ) - m*τ), τ = 0 .. π) - sin(m*π)/π*integral(e^(-z*sinh(τ) - m*τ), τ = 0 .. sqrt(-ln(TOL)))
Jn_Premium(m, z) := if(z == 0, if(m == 0, 1, 0), if(m == -floor(|m|), (-1)^m*JnSum_Premium(|m|, z), if(m < 0 and |Im(z)| == 0 and Re(z) > 0, JnInt_Premium(m, z), JnSum_Premium(m, z))))
Jn(m, z) := vectorize(margin_Pep(Jn_Premium(m, z), TOL^2, 0))
J0(z) := Jn(0, z)
J1(z) := Jn(1, z)
Jn.sc(m, z) := vectorize(e^(-|Im(z)|)*Jn(m, z))
J0.sc(z) := Jn.sc(0, z)
J1.sc(z) := Jn.sc(1, z)
YnBes_Premium(m, z) := (cos(m*π)*Jn(m, z) - Jn(-m, z))/sin(m*π)
YnInt_Premium(m, z) := 1/π*integral(sin(z*sin(τ) - m*τ), τ = 0 .. π) - 1/π*integral(e^(-z*sinh(τ))*(e^(m*τ) + e^(-m*τ)*cos(m*π)), τ = 0 .. sqrt(-ln(TOL)))
Yn_Premium(m, z) := if(floor(|m|) == m, YnInt_Premium(m, z), YnBes_Premium(m, z))
Yn(m, z) := vectorize(Yn_Premium(m, z))
Y0(z) := Yn(0, z)
Y1(z) := Yn(1, z)
Yn.sc(m, z) := vectorize(e^(-|Im(z)|)*Yn(m, z))
Y0.sc(z) := Yn.sc(0, z)
Y1.sc(z) := Yn.sc(1, z)
InSum_Premium(m, z) := (z/2)^m*sum((z/2)^(2*k)/(k!*Γ(m + k + 1)), k = 0 .. -4*ln(TOL))
InInt_Premium(m, z) := 1/π*integral(e^(z*cos(τ))*cos(m*τ), τ = 0 .. π) - sin(m*π)/π*integral(e^(-z*cosh(τ) - m*τ), τ = 0 .. sqrt(-ln(TOL)))
InCore_Premium(m, z) := if(|Re(z)| < TOL, InInt_Premium(m, z), InSum_Premium(m, z))
In_Premium(m, z) := if(z == 0, if(m == 0, 1, 0), if(m < 0, -InCore_Premium(-m, z), InCore_Premium(m, z)))
In(m, z) := vectorize(margin_Pep(In_Premium(m, z), TOL^2, 0))
I0(z) := In(0, z)
I1(z) := In(1, z)
In.sc(m, z) := vectorize(e^(-|Re(z)|)*In(m, z))
I0.sc(z) := vectorize(In.sc(0, z))
I1.sc(z) := vectorize(In.sc(1, z))
KnBes_Premium(m, z) := π/2*(In(-m, z) - In(m, z))/sin(m*π)
KnInt_Premium(m, z) := integral(e^(-z*cosh(τ))*cosh(m*τ), τ = 0 .. sqrt(-ln(TOL)))
Kn_Premium(m, z) := if(m == 0, KnInt_Premium(m, z), KnBes_Premium(m, z))
Kn(m, z) := vectorize(margin_Pep(Kn_Premium(m, z), TOL^2, 0))
K0(z) := Kn(0, z)
K1(z) := Kn(1, z)
Kn.sc(m, z) := vectorize(e^z*Kn(m, z))
K0.sc(z) := vectorize(Kn.sc(0, z))
K1.sc(z) := vectorize(Kn.sc(1, z))
ber(m, z) := Re(Jn(m, z*e^(3i/4*π)))
bei(m, z) := Im(Jn(m, z*e^(3i/4*π)))
js_Premium(m, z) := if(z == 0, 0, sqrt(π/(2*z))*Jn(m + 1/2, z))
ys_Premium(m, z) := (-1)^(m + 1)*sqrt(π/(2*z))*Jn(-m - 1/2, z)
js(m, z) := vectorize(js_Premium(m, z))
ys(m, z) := vectorize(ys_Premium(m, z))
H1(m, z) := Jn(m, z) + Yn(m, z)*1i
H2(m, z) := Jn(m, z) - Yn(m, z)*1i
H1.sc(m, z) := vectorize(e^(-(z*1i))*H1(m, z))
H2.sc(m, z) := vectorize(e^(z*1i)*H2(m, z))
# Data analysis functions
trimSel_Premium(M, R, r) := if(r == ORIGIN, M[R[r], :], stack(trimSel_Premium(M, R, r - 1), M[R[r], :]))
trim_Premium(M, R) := trimSel_Premium(M, R, last(R))
trim(M, vindex) := if(IsArray(vindex), trim_Premium(M, ditch_Pep(matrix(rows(M), 1, max), sort(vindex))), trim_Premium(M, ditch_Pep(matrix(rows(M), 1, max), [vindex])))
selectRofC(I, c, r) := if(r == ORIGIN, if(c == I[r][ORIGIN + 1], I[r][ORIGIN], ORIGIN - 1), stack(selectRofC(I, c, r - 1), if(c == I[r][ORIGIN + 1], I[r][ORIGIN], ORIGIN - 1)))
markNaNr_Premium(M, m, I) := if(m == ORIGIN, if(sum(vectorize(I == m)), NaN, M[m]), stack(markNaNr_Premium(M, m - 1, I), if(sum(vectorize(I == m)), NaN, M[m])))
markNaNc_Premium(M, r, c, I) := if(c == ORIGIN, markNaNr_Premium(M[:, c], last(M[:, c]), selectRofC(I, c, last(I))), augment(markNaNc_Premium(M, r, c - 1, I), markNaNr_Premium(M[:, c], last(M[:, c]), selectRofC(I, c, last(I)))))
markNaN(M, I) := if(cols(I) == 1, if(IsArray(M), if(cols(M) == 1, markNaNr_Premium(M, last(M), I), markNaNc_Premium(M, ORIGIN + rows(M) - 1, ORIGIN + cols(M) - 1, I)), error("First argument must be matrix or vector.")), error("Second argument must be vector."))
matchNanR_Premium(M, r, c) := if(r == ORIGIN, if(IsNaN(M[r, if(c < ORIGIN, ORIGIN, c)]), if(c < ORIGIN, [r], [[r; c]]), NaN), if(IsNaN(M[r, if(c < ORIGIN, ORIGIN, c)]), if(IsNaN(matchNanR_Premium(M, r - 1, c)), if(c < ORIGIN, [r], [[r; c]]), stack(matchNanR_Premium(M, r - 1, c), if(c < ORIGIN, [r], [[r; c]]))), matchNanR_Premium(M, r - 1, c)))
matchNanC_Premium(M, r, c) := if(c == ORIGIN, matchNanR_Premium(M, r, c), if(IsNaN(matchNanR_Premium(M, r, c)), matchNanC_Premium(M, r, c - 1), stack(matchNanC_Premium(M, r, c - 1), matchNanR_Premium(M, r, c))))
matchNaN_Premium(M) := if(cols(M) > 1, matchNanC_Premium(M, ORIGIN + rows(M) - 1, ORIGIN + cols(M) - 1), matchNanR_Premium(M, last(M), ORIGIN - 1))
matchNaN(M) := if(IsNaN(matchNaN_Premium(M)), error("No matching values found."), if(IsNaN(matchNaN_Premium(M)[ORIGIN]), removeFirst_Pep(matchNaN_Premium(M)), matchNaN_Premium(M)))
filterNanRows_Premium(V, v) := if(v == ORIGIN, [V[v][ORIGIN]], stack(filterNanRows_Premium(V, v - 1), V[v][ORIGIN]))
filterNanGetRows_Premium(V) := unique_Pep(filterNanRows_Premium(V, last(V)))
filterNaN(M) := if(IsNaN(matchNaN_Premium(M)), M, trim(M, filterNanGetRows_Premium(matchNaN(M))))
# Solve functions
# The function PolyEval() evaluates the d'th derivative the polynomial with coefficients c at points x.
# d=0 gives the polynomial itself.
PolyEval(c, x, d) := if(d < 1, sum(c[ORIGIN + i]*x^i, i = 0 .. length(c) - 1), if(d > length(c) - 1, 0, sum(i!/(i - d)!*c[ORIGIN + i]*x^(i - d), i = d .. length(c) - 1)))
# The function PolyPoly() evaluates the d'th derivative of the polynome of poles p at x
# d=0 gives the pole polynome itself, other supported values are 1 and 2.
PolePoly(p, x, d) := if(d == 0, product(x - p[ORIGIN + i], i = 0 .. length(p) - 1), if(d == 1, sum(product((x - p[ORIGIN + i])^(i ≠ i1), i = 0 .. length(p) - 1), i1 = 0 .. length(p) - 1), if(d == 2, sum(sum(product((x - p[ORIGIN + i])^((i ≠ i1)*(i ≠ i2)), i = 0 .. length(p) - 1), i2 = 0 .. length(p) - 1) - product((x - p[ORIGIN + i])^(i ≠ i1), i = 0 .. length(p) - 1), i1 = 0 .. length(p) - 1), error("Not supported."))))
# The function ReducePoly() reduces polynomial with coefficients c by the polynome of poles p and evaluates it's d'th derivative at x.
# If p is not an array, the polynomial is not reduced before evaluation.
# Only values 0, 1 and 2 for d are supported for a reduced polynomial.
ReducePoly(c, p, x, d) := if(not IsArray(p), PolyEval(c, x, d), if(d == 0, PolyEval(c, x, 0)/PolePoly(p, x, 0), if(d == 1, PolyEval(c, x, 1)/PolePoly(p, x, 0) - PolyEval(c, x, 0)*PolePoly(p, x, 1)/PolePoly(p, x, 0)^2, if(d == 2, PolyEval(c, x, 2)/PolePoly(p, x, 0) - (2*PolyEval(c, x, 1)*PolePoly(p, x, 1) - PolyEval(c, x, 0)*PolePoly(p, x, 2))/PolePoly(p, x, 0)^2 + 2*PolyEval(c, x, 0)*PolePoly(p, x, 1)^2/PolePoly(p, x, 0)^3, error("Not supported.")))))
# The function PolyOrder() calculates the (effective) order of a polynome with coefficients c reduced by poles p.
PolyOrder(c, p) := length(c) - 1 + if(IsArray(p), length(p), 0)
# The function polyroots_root() calculates a single root of polynome with coefficients c reduced by poles p.
polyroots_root(c, p, x) := if(|ReducePoly(c, p, x, 0)| < TOL, margin_Pep(x, TOL, 0), polyroots_root(c, p, x - PolyOrder(c, p)/largest_Pep(ReducePoly(c, p, x, 1)/ReducePoly(c, p, x, 0) + sqrt((PolyOrder(c, p) - 1)*((PolyOrder(c, p) - 1)*(ReducePoly(c, p, x, 1)/ReducePoly(c, p, x, 0))^2 - PolyOrder(c, p)*ReducePoly(c, p, x, 2)/ReducePoly(c, p, x, 0))), ReducePoly(c, p, x, 1)/ReducePoly(c, p, x, 0) - sqrt((PolyOrder(c, p) - 1)*((PolyOrder(c, p) - 1)*(ReducePoly(c, p, x, 1)/ReducePoly(c, p, x, 0))^2 - PolyOrder(c, p)*ReducePoly(c, p, x, 2)/ReducePoly(c, p, x, 0))))))
# The function polyroots_roots() calculates all roots of polynome with coefficients c reduced by poles p.
# The first root is duplicated.
polyroots_roots(c, p, z) := if(z == 0, polyroots_root(c, p, 0), stack(polyroots_root(c, p, 0), polyroots_roots(c, if(p == 0, polyroots_root(c, 0, 0), stack(p, polyroots_root(c, p, 0))), z - 1)))
# The function polyroots_Premium() calculates all roots of 1st and 2nd order polynomials directly, otherwise calls polyroots_roots.
polyroots_Premium(v, l) := if(l == 2, [
    (-v[ORIGIN + 1] + sqrt(v[ORIGIN + 1]^2 - 4*v[ORIGIN + 2]*v[ORIGIN]))/(2*v[ORIGIN + 2]);
    (-v[ORIGIN + 1] - sqrt(v[ORIGIN + 1]^2 - 4*v[ORIGIN + 2]*v[ORIGIN]))/(2*v[ORIGIN + 2])
], if(l == 1, -v[ORIGIN]/v[ORIGIN + 1], sort(removeFirst_Pep(polyroots_roots(v, 0, l)))))
# The function polyroots() checks the size of the polynomial, calls polyroots_Premium if OK.
polyroots(v) := if(1 < length(v) ≤ 100, polyroots_Premium(removeTrail_Pep(v), length(removeTrail_Pep(v)) - 1), error("Degree of polynomial must be between 1 and 99."))
# Interpolation functions
linterp(Vx, Vy, v) := if(v ≤ Vx[ORIGIN], Vy[ORIGIN] + (v - Vx[ORIGIN])*(Vy[ORIGIN + 1] - Vy[ORIGIN])/(Vx[ORIGIN + 1] - Vx[ORIGIN]), if(v ≥ max(Vx), Vy[last(Vy)] + (v - Vx[last(Vx)])*(Vy[last(Vy) - 1] - Vy[last(Vy)])/(Vx[last(Vy) - 1] - Vx[last(Vy)]), Vy[last(match(v, Vx, "leq"))] + (v - Vx[last(match(v, Vx, "leq"))])*(Vy[match(v, Vx, "geq")[ORIGIN]] - Vy[last(match(v, Vx, "lt"))])/(Vx[match(v, Vx, "geq")[ORIGIN]] - Vx[last(match(v, Vx, "lt"))])))
# Curve fitting and smoothing functions
slope(Vx, Vy) := sum(vectorize((Vx - sum(Vx)/length(Vx))*(Vy - sum(Vy)/length(Vy))))/sum((Vx - sum(Vx)/length(Vx))^2)
intercept(Vx, Vy) := sum(Vy)/length(Vy) - slope(Vx, Vy)*sum(Vx)/length(Vx)
stderr(Vx, Vy) := sqrt(1/(length(Vx) - 2)*sum((Vy[i] - (intercept(Vx, Vy) + slope(Vx, Vy)*Vx[i]))^2, i = ORIGIN .. last(Vx)))
line(Vx, Vy) := [intercept(Vx, Vy); slope(Vx, Vy)]
# Statistical functions
mean(A) := if(rows(A) > 1 and cols(A) > 1, sum(sum(A[r, c], r = ORIGIN .. ORIGIN + rows(A) - 1), c = ORIGIN .. ORIGIN + cols(A) - 1)/(cols(A)*rows(A)), if(rows(A) > 1, sum(A[r], r = ORIGIN .. ORIGIN + rows(A) - 1)/rows(A), if(cols(A) > 1, sum(A[ORIGIN, c], c = ORIGIN .. ORIGIN + cols(A) - 1)/cols(A), if(IsArray(A), A[ORIGIN, ORIGIN], A))))
gmean(A) := if(rows(A) > 1 and cols(A) > 1, product(product(A[r, c], r = ORIGIN .. ORIGIN + rows(A) - 1), c = ORIGIN .. ORIGIN + cols(A) - 1)^(1/(cols(A)*rows(A))), if(rows(A) > 1, product(A[r], r = 0 .. ORIGIN + rows(A) - 1)^(1/rows(A)), if(cols(A) > 1, product(A[ORIGIN, c], c = 0 .. ORIGIN + cols(A) - 1)^(1/cols(A)), if(IsArray(A), A[ORIGIN, ORIGIN], A))))
hmean(A) := if(rows(A) > 1 and cols(A) > 1, (sum(sum(1/A[r, c], r = ORIGIN .. ORIGIN + rows(A) - 1), c = ORIGIN .. ORIGIN + cols(A) - 1)/(cols(A)*rows(A)))^-1, if(rows(A) > 1, (sum(1/A[r], r = ORIGIN .. ORIGIN + rows(A) - 1)/rows(A))^-1, if(cols(A) > 1, (sum(1/A[ORIGIN, c], c = ORIGIN .. ORIGIN + cols(A) - 1)/cols(A))^-1, if(IsArray(A), A[ORIGIN, ORIGIN], A))))
percentile(v, p) := if(p < 1/(length(v) + 1), v[ORIGIN], if(p > length(v)/(length(v) + 1), v[last(v)], linterp(submatrix((matrix(length(v) + 2, 1, max) - ORIGIN)/(length(v) + 1), ORIGIN + 1, last(v) + 1, ORIGIN, ORIGIN), sort(v), p)))
median(A) := if(rows(A) == 1 and cols(A) == 1, A[ORIGIN], if(rows(A) > 1 and cols(A) == 1, percentile(A, 1/2), if(cols(A) > 1 and rows(A) == 1, percentile(transpose(A), 1/2), if(IsArray(A), error("Matrix not (yet) supported"), A))))
multi_Premium(V, v) := if(v + length(match(V[v], V)) > last(V), augment(V[v], length(match(V[v], V))), stack(augment(V[v], length(match(V[v], V))), multi_Premium(V, v + length(match(V[v], V)))))
mode(V) := if(max(multi_Premium(sort(V), ORIGIN)[:, ORIGIN + 1]) == 1, error("All values occur only once."), if(length(match(max(multi_Premium(sort(V), ORIGIN)[:, ORIGIN + 1]), multi_Premium(sort(V), ORIGIN)[:, ORIGIN + 1])) > 1, error("Multimodal."), multi_Premium(sort(V), ORIGIN)[match(max(multi_Premium(sort(V), ORIGIN)[:, ORIGIN + 1]), multi_Premium(sort(V), ORIGIN)[:, ORIGIN + 1])[ORIGIN], ORIGIN]))
countes_Premium(V, v, I, i, t) := if(v ≥ last(V) or V[v] > I[i + 1], t + (I[i] ≤ V[v] < I[i + 1]), countes_Premium(V, v + 1, I, i, t + (I[i] ≤ V[v] < I[i + 1])))
sumup_Premium(V, I, i) := if(i ≥ last(I) - 1, countes_Premium(V, 0, I, last(I) - 1, 0), stack(countes_Premium(V, 0, I, i, 0), sumup_Premium(V, I, i + 1)))
hist_Premium(I, V) := sum(sumup_Premium(submatrix(V, ORIGIN + s*2131, min(last(V), ORIGIN + (s + 1)*2131 - 1), ORIGIN, ORIGIN), I, 0), s = 0 .. floor(length(V)/2131))
hist(I, V) := if(IsArray(I), hist_Premium(I, sort(V)), hist_Premium(stack(min(V) + matrix(I, 1, max)/I*(max(V) - min(V)), max(V) + TOL), sort(V)))
histogram(I, V) := augment(if(IsArray(I), (removeLast_Pep(I) + removeFirst_Pep(I))/2, (submatrix(stack(min(V) + matrix(I, 1, max)/I*(max(V) - min(V)), max(V) + TOL), ORIGIN, ORIGIN + I - 1, ORIGIN, ORIGIN) + submatrix(stack(min(V) + matrix(I, 1, max)/I*(max(V) - min(V)), max(V) + TOL), ORIGIN + 1, ORIGIN + I, ORIGIN, ORIGIN))/2), hist(I, V))
sm1_Premium(Vx, Vy) := submatrix(csort(augment(Vx, Vy), ORIGIN), ORIGIN, ORIGIN + ceil(length(Vx)/3) - 1, ORIGIN, ORIGIN + 1)
Vx1m_Premium(Vx, Vy) := median(sm1_Premium(Vx, Vy)[:, ORIGIN])
Vy1m_Premium(Vx, Vy) := median(sm1_Premium(Vx, Vy)[:, ORIGIN + 1])
sm2_Premium(Vx, Vy) := submatrix(csort(augment(Vx, Vy), ORIGIN), ORIGIN + ceil(length(Vx)/3), last(Vx) - ceil(length(Vx)/3), ORIGIN, ORIGIN + 1)
Vx2m_Premium(Vx, Vy) := median(sm2_Premium(Vx, Vy)[:, ORIGIN])
Vy2m_Premium(Vx, Vy) := median(sm2_Premium(Vx, Vy)[:, ORIGIN + 1])
sm3_Premium(Vx, Vy) := submatrix(csort(augment(Vx, Vy), ORIGIN), last(Vx) - ceil(length(Vx)/3) + 1, last(Vx), ORIGIN, ORIGIN + 1)
Vx3m_Premium(Vx, Vy) := median(sm3_Premium(Vx, Vy)[:, ORIGIN])
Vy3m_Premium(Vx, Vy) := median(sm3_Premium(Vx, Vy)[:, ORIGIN + 1])
medfit(Vx, Vy) := [
    2/3*linterp([Vx1m_Premium(Vx, Vy); Vx3m_Premium(Vx, Vy)], [Vy1m_Premium(Vx, Vy); Vy3m_Premium(Vx, Vy)], Vx2m_Premium(Vx, Vy)) + 1/3*Vy2m_Premium(Vx, Vy) - slope([Vx1m_Premium(Vx, Vy); Vx3m_Premium(Vx, Vy)], [Vy1m_Premium(Vx, Vy); Vy3m_Premium(Vx, Vy)])*Vx2m_Premium(Vx, Vy);
    slope([Vx1m_Premium(Vx, Vy); Vx3m_Premium(Vx, Vy)], [Vy1m_Premium(Vx, Vy); Vy3m_Premium(Vx, Vy)])
]
var(A) := if(rows(A) > 1 and cols(A) > 1, sum(sum((A[r, c] - mean(A))^2, r = ORIGIN .. ORIGIN + rows(A) - 1), c = ORIGIN .. ORIGIN + cols(A) - 1)/(cols(A)*rows(A)), if(rows(A) > 1, sum((A[r] - mean(A))^2, r = ORIGIN .. ORIGIN + rows(A) - 1)/rows(A), if(cols(A) > 1, sum((A[ORIGIN, c] - mean(A))^2, c = ORIGIN .. ORIGIN + cols(A) - 1)/cols(A), 0)))
Var(A) := if(rows(A) > 1 and cols(A) > 1, sum(sum((A[r, c] - mean(A))^2, r = ORIGIN .. ORIGIN + rows(A) - 1), c = ORIGIN .. ORIGIN + cols(A) - 1)/(cols(A)*rows(A) - 1), if(rows(A) > 1, sum((A[r] - mean(A))^2, r = ORIGIN .. ORIGIN + rows(A) - 1)/(rows(A) - 1), if(cols(A) > 1, sum((A[ORIGIN, c] - mean(A))^2, c = ORIGIN .. ORIGIN + cols(A) - 1)/(cols(A) - 1), 0)))
stdev(A) := sqrt(var(A))
Stdev(A) := sqrt(Var(A))
cvar(A, B) := if(IsArray(A) and IsArray(B), if(rows(A) > 1 and cols(A) > 1, sum(sum((A[r, c] - mean(A))*(B[r, c] - mean(B)), r = ORIGIN .. ORIGIN + rows(A) - 1), c = ORIGIN .. ORIGIN + cols(A) - 1)/(cols(A)*rows(A)), if(rows(A) > 1, sum((A[r] - mean(A))*(B[r] - mean(B)), r = ORIGIN .. ORIGIN + rows(A) - 1)/rows(A), sum((A[ORIGIN, c] - mean(A))*(B[ORIGIN, c] - mean(B)), c = ORIGIN .. ORIGIN + cols(A) - 1)/cols(A))), error("This operation can only be performed on arrays."))
corr(A, B) := cvar(A, B)/(stdev(A)*stdev(B))
kurt(A) := rows(A)*cols(A)*(rows(A)*cols(A) + 1)*if(rows(A) > 1 and cols(A) > 1, sum(sum((A[r, c] - mean(A))^4, r = ORIGIN .. ORIGIN + rows(A) - 1), c = ORIGIN .. ORIGIN + cols(A) - 1)/Stdev(A), if(rows(A) > 1, sum((A[r] - mean(A))^4, r = ORIGIN .. ORIGIN + rows(A) - 1)/Stdev(A), sum((A[ORIGIN, c] - mean(A))^4, c = ORIGIN .. ORIGIN + cols(A) - 1)/Stdev(A)))/((rows(A)*cols(A) - 1)*(rows(A)*cols(A) - 2)*(rows(A)*cols(A) - 3)) - 3*(rows(A)*cols(A) - 1)^2/((rows(A)*cols(A) - 2)*(rows(A)*cols(A) - 3))
skew(A) := rows(A)*cols(A)*if(rows(A) > 1 and cols(A) > 1, sum(sum((A[r, c] - mean(A))^3, r = ORIGIN .. ORIGIN + rows(A) - 1), c = ORIGIN .. ORIGIN + cols(A) - 1)/Stdev(A), if(rows(A) > 1, sum((A[r] - mean(A))^3, r = ORIGIN .. ORIGIN + rows(A) - 1)/Stdev(A), sum((A[ORIGIN, c] - mean(A))^3, c = ORIGIN .. ORIGIN + cols(A) - 1)/Stdev(A)))/((rows(A)*cols(A) - 1)*(rows(A)*cols(A) - 2))
LogNormal(n) := rlnorm(n, 0, 1)
Normal(n) := rnorm(n, 0, 1)
Uniform(n) := runif(n, -6, 6)
Weibull(n) := rweibull(n, 1)
# Distribution functions
dbeta(x, s1, s2) := if(s1 > 0 and s2 > 0, if(0 ≤ x ≤ 1, Γ(s1 + s2)/(Γ(s1)*Γ(s2))*x^(s1 - 1)*(1 - x)^(s2 - 1), 0), error("Parameter error."))
pbeta(x, s1, s2) := integral(dbeta(ξ, s1, s2), ξ = 0 .. x)
qbeta(p, s1, s2) := if(0 ≤ p ≤ 1, if(p == 1, 1, root(pbeta(x, s1, s2) - p, x, 0, 1)), error("Probability must be from 0...1."))
dbinom(k, n, q) := if(0 ≤ q ≤ 1, if(0 ≤ k ≤ n, n!*q^k*(1 - q)^(n - k)/(k!*(n - k)!), 0), error("Parameter error."))
pbinom(k, n, q) := sum(dbinom(κ, n, q), κ = 0 .. k)
qbinom(p, n, q) := if(0 ≤ p ≤ 1, root(pbinom(k, n, q) - p, k, 0, n), error("Probability must be from 0...1."))
dcauchy(x, l, s) := if(s > 0, 1/π*s/((x - l)^2 + s^2), error("Parameter error."))
pcauchy(x, l, s) := atan((x - l)/s)/π + 1/2
qcauchy(p, l, s) := if(0 ≤ p ≤ 1, l - s*cot(p*π), error("Probability must be from 0...1."))
dchisq(x, d) := if(d > 0, if(x < 0, 0, e^(-x/2)*(x/2)^(d/2 - 1)/(2*Γ(d/2))), error("Parameter error."))
pchisq(x, d) := integral(dchisq(ξ, d), ξ = 0 .. x)
qchisq(p, d) := if(0 ≤ p ≤ 1, root(pchisq(x, d) - p, x, 0, d/sqrt(TOL)), error("Probability must be from 0...1."))
dexp(x, r) := if(r > 0, if(x < 0, 0, r*e^(-r*x)), error("Parameter error."))
pexp(x, r) := if(r > 0, 1 - e^(-r*x), error("Parameter error."))
qexp(p, r) := if(0 ≤ p ≤ 1, if(r > 0, -ln(1 - p)/r, error("Parameter error.")), error("Probability must be from 0...1."))
dF(x, d1, d2) := if(d1 ≥ 1 or d2 ≥ 1, if(x < 0, 0, d1^(d1/2)*d2^(d2/2)*Γ((d1 + d2)/2)*x^(d1/2 - 1)/(Γ(d1/2)*Γ(d2/2)*(d2 + x*d1)^((d1 + d2)/2))), error("Parameter error."))
pF(x, d1, d2) := integral(dF(ξ, d1, d2), ξ = 0 .. x)
qF(p, d1, d2) := if(0 ≤ p ≤ 1, root(pF(x, d1, d2) - p, x, 0, (d1 + d2)/sqrt(TOL)), error("Probability must be from 0...1."))
dgamma(x, s) := if(s > 0, if(x > 0, x^(s - 1)*e^(-x)/Γ(s), 0), error("Parameter error."))
pgamma(x, s) := integral(dgamma(ξ, s), ξ = 0 .. x)
qgamma(p, s) := if(0 ≤ p ≤ 1, root(pgamma(x, s) - p, x, 0, s/sqrt(TOL)), error("Probability must be from 0...1."))
dgeom(k, q) := if(0 ≤ q ≤ 1, if(k < 0, 0, q*(1 - q)^k), error("Parameter error."))
pgeom(k, q) := if(0 ≤ q ≤ 1, if(k < 0, 0, 1 - (1 - q)^floor(k + 1)), error("Parameter error."))
qgeom(p, q) := if(0 ≤ p ≤ 1, ceil(ln((p - 1)/(q - 1))/ln(1 - q)), error("Probability must be from 0...1."))
dhypergeom(m, a, b, n) := if(0 ≤ m ≤ a and 0 ≤ n - m ≤ b and 0 ≤ n ≤ a + b, combin(a, m)*combin(b, n - m)/combin(a + b, n), 0)
phypergeom(m, a, b, n) := sum(dhypergeom(μ, a, b, n), μ = 0 .. m)
qhypergeom(p, a, b, n) := if(0 ≤ p ≤ 1, root(phypergeom(m, a, b, n) - p, m, 0, a), error("Probability must be from 0...1."))
dlnorm(x, μ, σ) := if(σ > 0, if(x > 0, e^(-(ln(x) - μ)^2/(2*σ^2))/(sqrt(2*π)*σ*x), 0), error("Parameter error."))
plnorm(x, μ, σ) := if(x > 0, 1/2*(1 + erf((ln(x) - μ)/(sqrt(2)*σ))), 0)
qlnorm(p, μ, σ) := if(0 ≤ p ≤ 1, root(plnorm(x, μ, σ) - p, x, 0, μ + σ/TOL), error("Probability must be from 0...1."))
dlogis(x, l, s) := if(s > 0, e^(-(x - l)/s)/(s*(1 + e^(-(x - l)/s))^2), error("Parameter error."))
plogis(x, l, s) := if(s > 0, e^(x/s)/(e^(x/s) + e^(l/s)), error("Parameter error."))
qlogis(p, l, s) := if(s > 0, if(0 ≤ p ≤ 1, s*ln(p/(1 - p)*e^(l/s)), error("Probability must be from 0...1.")), error("Parameter error."))
dnorm(x, μ, σ) := if(σ > 0, e^(-(x - μ)^2/(2*σ^2))/(sqrt(2*π)*σ), error("Parameter error."))
pnorm(x, μ, σ) := 1/2*(1 + erf((x - μ)/(sqrt(2)*σ)))
qnorm(p, μ, σ) := if(0 ≤ p ≤ 1, root(pnorm(x, μ, σ) - p, x, atanh(2*p - 1)*σ - μ, atanh(2*p - 1)*σ + 3*μ), error("Probability must be from 0...1."))
cnorm(x) := pnorm(x, 0, 1)
dnbinom(k, n, q) := if(0 < q ≤ 1, if(n > 0 and k ≥ 0, combin(n + k - 1, k)*q^n*(1 - q)^k, 0), error("Parameter error."))
pnbinom(k, n, q) := sum(dnbinom(κ, n, q), κ = 0 .. k)
qnbinom(p, n, q) := if(0 ≤ p ≤ 1, root(pnbinom(x, n, q) - p, x, 0, n), error("Probability must be from 0...1."))
dpois(k, λ) := if(λ > 0, if(k ≥ 0, λ^k/k!*e^(-λ), 0), error("Parameter error."))
ppois(k, λ) := sum(dpois(κ, λ), κ = 0 .. k)
qpois(p, λ) := if(0 ≤ p ≤ 1, root(ppois(x, λ) - p, x, 0, λ/sqrt(TOL)), error("Probability must be from 0...1."))
dt(x, d) := if(d ≥ 1, Γ((d + 1)/2)/(Γ(d/2)*sqrt(π*d))*(1 + x^2/d)^(-(d + 1)/2), error("Parameter error."))
pt(x, d) := integral(dt(ξ, d), ξ = -∞ .. x)
qt(p, d) := if(0 ≤ p ≤ 1, root(pt(x, d) - p, x, -d/sqrt(TOL), d/sqrt(TOL)), error("Probability must be from 0...1."))
dunif(x, a, b) := if(b > a, if(a ≤ x ≤ b, x/(b - a), 0), error("Parameter error."))
punif(x, a, b) := if(b > a, if(x > a, if(x < b, (x - a)/(b - a), 1), 0), error("Parameter error."))
qunif(p, a, b) := if(b > a, if(0 ≤ p ≤ 1, a + p*(b - a), error("Probability must be from 0...1.")), error("Parameter error."))
dweibull(x, s) := if(s > 0, if(x ≥ 0, s*x^(s - 1)*e^(-x^s), 0), error("Parameter error."))
pweibull(x, s) := if(s > 0, 1 - e^(-x^s), error("Parameter error."))
qweibull(p, s) := if(s > 0, if(0 ≤ p ≤ 1, if(p == 1, (16*ln(10))^(1/s), (-ln(1 - p))^(1/s)), error("Probability must be from 0...1.")), error("Parameter error."))
gaussn(n) := rnorm(n, 0, 1)
whiten(n) := runif(n, -0.5, 0.5)
# Smoothing functions
smooth_avg(v, n, i, α) := sum(v[e], e = max(i + 1 - n, ORIGIN) .. min(i, last(v)))/(min(i, last(v)) - max(i + 1 - n, ORIGIN) + 1)
smooth_med(v, n, i, α) := median(submatrix(v, i - min(last(v) - i, i - ORIGIN, ceil((n - 1)/2)), i + min(last(v) - i, i - ORIGIN, ceil((n - 1)/2)), ORIGIN, ORIGIN))
smooth_exp(v, n, i, α) := if(i == 0, v[ORIGIN], (1 - α)^i*v[ORIGIN] + α*sum(vectorize(submatrix(v, ORIGIN + 1, ORIGIN + i, ORIGIN, ORIGIN)*(1 - α)^(i - 1 - matrix(i, 1, max)))))
smooth_Kern(t) := e^(-t^2/(2*0.37^2))/(sqrt(2*π)*0.37)
smooth_Gauss(vx, vy, i, α) := sum(smooth_Kern((vx[i] - vx[j])/α)*vy[j], j = ORIGIN .. last(vy))/sum(smooth_Kern((vx[i] - vx[j])/α), j = ORIGIN .. last(vy))
smooth_Premium(v, n, i, α, fun) := if(i == 0, fun(v, n, last(v) - i, α), stack(fun(v, n, last(v) - i, α), smooth_Premium(v, n, i - 1, α, fun)))
movavg(v, n) := smooth_Premium(v, n, last(v), 0, smooth_avg)
medsmooth(v, n) := smooth_Premium(v, n, last(v), 0, smooth_med)
expsmooth(v, a) := smooth_Premium(v, 0, last(v), a, smooth_exp)
ksmooth(vx, vy, b) := if(length(vx) == length(vy), if(vx == sort(vx), if(b > 0, smooth_Premium(vx, vy, last(vx), b, smooth_Gauss), error("Bandwidth must be positive.")), error("First vector must be in ascending order.")), error("Vectors must have equal length."))
Smooth_Pep(V, W, i) := if(i == 0 or sum(abs_Pep(V - medsmooth(V, W))) < TOL, medsmooth(V, W), Smooth_Pep(medsmooth(V, W), W, i - 1))
VSmooth_Premium(V, W, w) := if(w == ORIGIN, Smooth_Pep(V, W[w], 100), VSmooth_Premium(Smooth_Pep(V, W[w], 100), W, w - 1))
VSmooth(v, W) := if(IsArray(W), VSmooth_Premium(v, reverse(W), last(W)), Smooth_Pep(v, W, 100))
# Windowing functions
blackman(n) := vectorize(0.42 - 0.5*cos(2*π*matrix(n, 1, max)/(n - 1)) + 0.08*cos(4*π*matrix(n, 1, max)/(n - 1)))
cheby_Premium(n, N, r) := 1/N*(1/r + 2*sum(Tcheb(N - 1, cosh(acosh(1/r)/(N - 1))*cos(i*π/N))*cos(2*π*i*(n - (N - 1)/2)/N), i = 1 .. (N - 1)/2))
# From: http://practicalcryptography.com/miscellaneous/machine-learning/implementing-dolph-chebyshev-window/
# Note that the formula (incorrect) differs from the C-program (correct) in the term containing n in the last sum term.
cheby(n, b) := if(2*floor(n/2) ≠ n, cheby_Premium(matrix(n, 1, max), n, 10^(-b/20))/max(cheby_Premium(matrix(n, 1, max), n, 10^(-b/20))), error("Window siz must be odd."))
costaper_Premium(an) := 1/2*(1 - cos(2*π*(matrix(floor(an/2), 1, max) + 1)/(an + 1)))
costaper(n, a) := if(n == 1, [1], if(a*n < 2, matrix(n, 1, min) + 1, stack(costaper_Premium(floor(a*n)), if(n - 2*floor(a*n/2) < 1, reverse(costaper_Premium(floor(a*n))), stack(matrix(n - 2*floor(a*n/2), 1, min) + 1, reverse(costaper_Premium(floor(a*n))))))))
gaussian(n, a) := e^(-1/2*(a*(matrix(n, 1, max) - (n - 1)/2)/((n - 1)/2))^2)
hamming(n) := vectorize(0.54 - 0.46*cos(2*π*matrix(n, 1, max)/(n - 1)))
hanning(n) := sin(π*matrix(n, 1, max)/(n - 1))^2
kaiser(n, b) := I0(b*sqrt(1 - (1 - 2*matrix(n, 1, max)/(n - 1))^2))/I0(b)
nuttall(n) := vectorize(0.3635819 - 0.4891775*cos(2*π*matrix(n, 1, max)/(n - 1)) + 0.1365995*cos(4*π*matrix(n, 1, max)/(n - 1)) - 0.0106411*cos(6*π*matrix(n, 1, max)/(n - 1)))
taprect_Premium(n) := 1/2*(1 - cos(π*matrix(n, 1, max)/n))
taprect(n) := stack(taprect_Premium(floor((n - 2)/10) + 1), matrix(n - 2*(floor((n - 2)/10) + 1), 1, min) + 1, reverse(taprect_Premium(floor((n - 2)/10) + 1)))
triangular(n) := vectorize(1 - |1 - 2*matrix(n, 1, max)/(n - 1)|)
# Digital filter functions
gain(C, f) := if(0 ≤ f ≤ 1, product(sum(C[ORIGIN + r, 2*c]*(e^(2i*π*f))^(-r), r = 0 .. rows(C) - 1)/sum(C[ORIGIN + r, 2*c + 1]*(e^(2i*π*f))^(-r), r = 0 .. rows(C) - 1), c = 0 .. cols(C)/2 - 1), error("Invalid frequency."))
butterOdd_Premium(n, i) := if(i == 0, [1, 1; 0, 1; 0, 0], augment([1, 1; 0, e^(-1i*i/n*π) + e^(1i*i/n*π); 0, 1], butterOdd_Premium(n, i - 1)))
butterEven_Premium(n, i) := if(i == 0, [1, 1; 0, e^(-1i/(2*n)*π) + e^(1i/(2*n)*π); 0, 1], augment([1, 1; 0, e^(-1i*(2*i + 1)/(2*n)*π) + e^(1i*(2*i + 1)/(2*n)*π); 0, 1], butterEven_Premium(n, i - 1)))
butter(n) := if(n ≤ 200, if(2*floor(n/2) + 1 == n, butterOdd_Premium(n, floor(n/2)), if(n > 0, if(2*floor(n/2) == n, butterEven_Premium(n, n/2 - 1), error("Order must be integer.")), error("Orderis not valid."))), error("Order must be 200 maximum."))
bessel_Premium(N, scale, n) := if(n == 0, [(2*N)!/(2^N*N!), (2*N)!/(2^N*N!)], stack(bessel_Premium(N, scale, n - 1), [0, (2*N - n)!*scale^n/(2^(N - n)*n!*(N - n)!)]))
bessel(N, scale) := if(N ≤ 35, if(scale > 0, bessel_Premium(N, scale, N), error("Scale must be >0.")), error("Order must be 35 maximum."))
cheby1poles(n, ε) := vectorize(-sinh(asinh(1/ε)/n)*sin(π*(1 + 2*matrix(floor((n - 1)/2) + 1, 1, max))/(2*n)) + 1i*cosh(asinh(1/ε)/n)*cos(π*(1 + 2*matrix(floor((n - 1)/2) + 1, 1, max))/(2*n)))
cheby1selop(n, ε) := reverse(cheby1poles(n, ε))
cheby1odd(n, ε, i) := if(i == ORIGIN, [-Re(cheby1selop(n, ε)[i]), -Re(cheby1selop(n, ε)[i]); 0, 1; 0, 0], augment([
    Re(cheby1selop(n, ε)[i])^2 + Im(cheby1selop(n, ε)[i])^2, Re(cheby1selop(n, ε)[i])^2 + Im(cheby1selop(n, ε)[i])^2;
    0, -2*Re(cheby1selop(n, ε)[i]);
    0, 1
], cheby1odd(n, ε, i - 1)))
cheby1even(n, ε, i) := if(i == ORIGIN, [
    ε^(n - 2)/product(Re(cheby1poles(n, ε)[i])^2 + Im(cheby1poles(n, ε)[i])^2, i = ORIGIN + 1 .. ORIGIN + (n - 1)/2), Re(cheby1poles(n, ε)[i])^2 + Im(cheby1poles(n, ε)[i])^2;
    0, -2*Re(cheby1poles(n, ε)[i]);
    0, 1
], augment(cheby1even(n, ε, i - 1), [
    Re(cheby1poles(n, ε)[i])^2 + Im(cheby1poles(n, ε)[i])^2, Re(cheby1poles(n, ε)[i])^2 + Im(cheby1poles(n, ε)[i])^2;
    0, -2*Re(cheby1poles(n, ε)[i]);
    0, 1
]))
cheby1(n, ε) := if(2*floor(n/2) + 1 == n, cheby1odd(n, ε, (n - 1)/2), if(n == floor(n), cheby1even(n, ε, n/2 - 1), error("Must be integer order.")))
cheby2zeros(n, scale) := 1i*scale/cos((2*matrix(if(2*floor(n/2) + 1 == n, 1 + (n - 1)/2, n/2), 1, max) + 1)*π/(2*n))
cheby2poles(n, scale, atte) := stack(-scale*(sinh(asinh(atte)/n)*sin(π*(2*matrix(if(2*floor(n/2) + 1 == n, 1 + (n - 1)/2, n/2), 1, max) + 1)/(2*n)) + 1i*cosh(asinh(atte)/n)*cos(π*(2*matrix(if(2*floor(n/2) + 1 == n, 1 + (n - 1)/2, n/2), 1, max) + 1)/(2*n)))/((sinh(asinh(atte)/n)*sin(π*(2*matrix(if(2*floor(n/2) + 1 == n, 1 + (n - 1)/2, n/2), 1, max) + 1)/(2*n)))^2 + (cosh(asinh(atte)/n)*cos(π*(2*matrix(if(2*floor(n/2) + 1 == n, 1 + (n - 1)/2, n/2), 1, max) + 1)/(2*n)))^2))
cheby2_Premium(P, Z, p) := if(p == 0, [
    if(|Im(Z[p])| > 10^15, |P[p]|, -|P[p]^2|*Z[p]^2), if(|Im(Z[p])| > 10^15, |P[p]|, -|P[p]^2|*Z[p]^2);
    0, if(|Im(Z[p])| > 10^15, 1, 2*Re(P[p])*Z[p]^2);
    if(|Im(Z[p])| > 10^15, 0, |P[p]^2|), if(|Im(Z[p])| > 10^15, 0, -Z[p]^2)
], augment(cheby2_Premium(P, Z, p - 1), [
    if(|Im(Z[p])| > 10^15, |P[p]|, -|P[p]^2|*Z[p]^2), if(|Im(Z[p])| > 10^15, |P[p]|, -|P[p]^2|*Z[p]^2);
    0, if(|Im(Z[p])| > 10^15, 1, 2*Re(P[p])*Z[p]^2);
    if(|Im(Z[p])| > 10^15, 0, |P[p]^2|), if(|Im(Z[p])| > 10^15, 0, -Z[p]^2)
]))
cheby2(n, scale, atten) := if(n == floor(n), cheby2_Premium(cheby2poles(n, scale, sqrt(atten^2 - 1)), cheby2zeros(n, scale), if(2*floor(n/2) + 1 == n, (n - 1)/2, n/2 - 1)), error("Must be integer order."))
BLtLP_Premium(C, Fc) := if(C[ORIGIN + rows(C) - 1, ORIGIN] == 0 and C[ORIGIN + rows(C) - 1, ORIGIN + 1] == 0, [Fc, 1, 0; Fc, -1, 0; 0, 0, 0], [Fc^2, Fc, 1; 2*Fc^2, 0, -2; Fc^2, -Fc, 1])*C
BLtHP_Premium(C, Fc) := if(C[ORIGIN + rows(C) - 1, ORIGIN] == 0 and C[ORIGIN + rows(C) - 1, ORIGIN + 1] == 0, [1, Fc, 0; -1, Fc, 0; 0, 0, 0], [1, Fc, Fc^2; -2, 0, 2*Fc^2; 1, -Fc, Fc^2])*C
BLtBP_Premium(C, Fl, Fu) := if(C[ORIGIN + rows(C) - 1, ORIGIN] == 0 and C[ORIGIN + rows(C) - 1, ORIGIN + 1] == 0, [Fu - Fl, Fu*Fl + 1, 0; 0, 2*Fu*Fl - 2, 0; Fl - Fu, Fu*Fl + 1, 0; 0, 0, 0; 0, 0, 0], [
    (Fu - Fl)^2, (Fu - Fl)*(1 + Fl*Fu), (1 + Fl*Fu)^2;
    0, 2*(Fl - Fu)*(1 - Fl*Fu), 4*((Fl*Fu)^2 - 1);
    -2*(Fu - Fl)^2, 0, 6 - 2*Fl*Fu*(2 - 3*Fl*Fu);
    0, 2*(Fu - Fl)*(1 - Fl*Fu), 4*((Fl*Fu)^2 - 1);
    (Fu - Fl)^2, (Fl - Fu)*(1 + Fl*Fu), (1 + Fl*Fu)^2
])*C
BLtBS_Premium(C, Fl, Fu) := if(C[ORIGIN + rows(C) - 1, ORIGIN] == 0 and C[ORIGIN + rows(C) - 1, ORIGIN + 1] == 0, [Fu*Fl + 1, Fu - Fl, 0; 2*Fu*Fl - 2, 0, 0; Fu*Fl + 1, Fl - Fu, 0; 0, 0, 0; 0, 0, 0], [
    (1 + Fl*Fu)^2, (Fu - Fl)*(1 + Fl*Fu), (Fu - Fl)^2;
    4*((Fl*Fu)^2 - 1), 2*(Fl - Fu)*(1 - Fl*Fu), 0;
    6 - 2*Fl*Fu*(2 - 3*Fl*Fu), 0, -2*(Fu - Fl)^2;
    4*((Fl*Fu)^2 - 1), 2*(Fu - Fl)*(1 - Fl*Fu), 0;
    (1 + Fl*Fu)^2, (Fl - Fu)*(1 + Fl*Fu), (Fu - Fl)^2
])*C
iirLP_Premium(C, Fc, c) := if(c == ORIGIN, BLtLP_Premium(submatrix(C, ORIGIN, ORIGIN + rows(C) - 1, c, c + 1), tan(Fc*π))/BLtLP_Premium(submatrix(C, ORIGIN, ORIGIN + rows(C) - 1, c, c + 1), tan(Fc*π))[ORIGIN, ORIGIN + 1], augment(iirLP_Premium(C, Fc, c - 2), BLtLP_Premium(submatrix(C, ORIGIN, ORIGIN + rows(C) - 1, c, c + 1), tan(Fc*π))/BLtLP_Premium(submatrix(C, ORIGIN, ORIGIN + rows(C) - 1, c, c + 1), tan(Fc*π))[ORIGIN, ORIGIN + 1]))
iirlow(C, Fc) := if(rows(C) == 3, iirLP_Premium(C, Fc, ORIGIN + cols(C) - 2), error("Coefficient matrix not (yet) supported."))
iirHP_Premium(C, Fc, c) := if(c == ORIGIN, BLtHP_Premium(submatrix(C, ORIGIN, ORIGIN + rows(C) - 1, c, c + 1), tan(Fc*π))/BLtHP_Premium(submatrix(C, ORIGIN, ORIGIN + rows(C) - 1, c, c + 1), tan(Fc*π))[ORIGIN, ORIGIN + 1], augment(iirHP_Premium(C, Fc, c - 2), BLtHP_Premium(submatrix(C, ORIGIN, ORIGIN + rows(C) - 1, c, c + 1), tan(Fc*π))/BLtHP_Premium(submatrix(C, ORIGIN, ORIGIN + rows(C) - 1, c, c + 1), tan(Fc*π))[ORIGIN, ORIGIN + 1]))
iirhigh(C, Fc) := if(rows(C) == 3, iirHP_Premium(C, Fc, ORIGIN + cols(C) - 2), error("Coefficient matrix not (yet) supported."))
iirBP_Premium(C, Fl, Fu, c) := if(c == ORIGIN, BLtBP_Premium(submatrix(C, ORIGIN, ORIGIN + rows(C) - 1, c, c + 1), tan(Fl*π), tan(Fu*π))/BLtBP_Premium(submatrix(C, ORIGIN, ORIGIN + rows(C) - 1, c, c + 1), tan(Fl*π), tan(Fu*π))[ORIGIN, ORIGIN + 1], augment(iirBP_Premium(C, Fl, Fu, c - 2), BLtBP_Premium(submatrix(C, ORIGIN, ORIGIN + rows(C) - 1, c, c + 1), tan(Fl*π), tan(Fu*π))/BLtBP_Premium(submatrix(C, ORIGIN, ORIGIN + rows(C) - 1, c, c + 1), tan(Fl*π), tan(Fu*π))[ORIGIN, ORIGIN + 1]))
iirpass(C, Fl, Fu) := if(rows(C) == 3, iirBP_Premium(C, Fl, Fu, ORIGIN + cols(C) - 2), error("Coefficient matrix not (yet) supported."))
iirBS_Premium(C, Fl, Fu, c) := if(c == ORIGIN, BLtBS_Premium(submatrix(C, ORIGIN, ORIGIN + rows(C) - 1, c, c + 1), tan(Fl*π), tan(Fu*π))/BLtBS_Premium(submatrix(C, ORIGIN, ORIGIN + rows(C) - 1, c, c + 1), tan(Fl*π), tan(Fu*π))[ORIGIN, ORIGIN + 1], augment(iirBS_Premium(C, Fl, Fu, c - 2), BLtBS_Premium(submatrix(C, ORIGIN, ORIGIN + rows(C) - 1, c, c + 1), tan(Fl*π), tan(Fu*π))/BLtBS_Premium(submatrix(C, ORIGIN, ORIGIN + rows(C) - 1, c, c + 1), tan(Fl*π), tan(Fu*π))[ORIGIN, ORIGIN + 1]))
iirstop(C, Fl, Fu) := if(rows(C) == 3, iirBS_Premium(C, Fl, Fu, ORIGIN + cols(C) - 2), error("Coefficient matrix not (yet) supported."))
# Transforms
sintr_Premium(V, r, c) := margin_Pep(sum(V[i]*sin(π*i*r/length(V)), i = ORIGIN .. last(V)), TOL^2, 0)
sintr(V) := rowOp_Pep(V, length(V) - 1, ORIGIN, sintr_Premium)
isintr(V) := 2*sintr(V)/length(V)
costr_Premium(V, r, c) := margin_Pep(sum(V[i]*cos(π*i*j/length(V)), i = ORIGIN .. last(V)), TOL^2, 0)  # disabled
costr(V) := rowop_Pep(V, length(V) - 1, ORIGIN, costr_Premium)  # disabled
# Graphing functions
boxplot(Data) := [percentile(Data, 0.25); percentile(Data, 0.5); percentile(Data, 0.75); min(Data); max(Data)]
xy2pol(x, y) := [sqrt(x^2 + y^2); atan2(x, y)]
pol2xy(r, θ) := [r*cos(θ); r*sin(θ)]
xy2pol(v) := xy2pol(v[ORIGIN], v[ORIGIN + 1])
pol2xy(v) := pol2xy(v[ORIGIN], v[ORIGIN + 1])
sph2xyz(r, θ, φ) := [r*cos(θ)*sin(φ); r*sin(θ)*sin(φ); r*cos(φ)]
xyz2sph(x, y, z) := [
    sqrt(x^2 + y^2 + z^2);
    atan2(x/sqrt(x^2 + y^2), y/sqrt(x^2 + y^2));
    atan2(z/sqrt(x^2 + y^2 + z^2), sqrt(x^2 + y^2)/sqrt(x^2 + y^2 + z^2))
]
sph2xyz(v) := sph2xyz(v[ORIGIN], v[ORIGIN + 1], v[ORIGIN + 2])
xyz2sph(v) := xyz2sph(v[ORIGIN], v[ORIGIN + 1], v[ORIGIN + 2])
cyl2xyz(r, θ, z) := [r*cos(θ); r*sin(θ); z]
xyz2cyl(x, y, z) := [sqrt(x^2 + y^2); atan2(x/sqrt(x^2 + y^2), y/sqrt(x^2 + y^2)); z]
cyl2xyz(v) := cyl2xyz(v[ORIGIN], v[ORIGIN + 1], v[ORIGIN + 2])
xyz2cyl(v) := xyz2cyl(v[ORIGIN], v[ORIGIN + 1], v[ORIGIN + 2])
# Image processing functions
matmax(M1, M2) := max(M1, M2)
matmin(M1, M2) := min(M1, M2)
imgmax_Premium(M1, M2) := min(max(M1, M2, M1*0), M1*0 + 255)
imgmin_Premium(M1, M2) := max(M1*0, min(M1, M2, M1*0 + 255))
and(M1, M2) := vectorize(imgmin_Premium(M1, M2))
or(M1, M2) := vectorize(imgmax_Premium(M1, M2))
flip_Premium(M, c) := if(c == ORIGIN, M[:, c], augment(M[:, c], flip_Premium(M, c - 1)))
horzflip(M) := flip_Premium(M, ORIGIN + cols(M) - 1)
vertflip(M) := transpose(flip_Premium(transpose(M), ORIGIN + rows(M) - 1))
equalize(M) := vectorize(floor(M*255/max(M)))
invertimage(M) := if(min(M) ≥ 0, if(max(M) ≤ 255, 255 - M, max(M) + min(M) - M), error("Image values must be >0."))
threshold(M, thresh) := if(thresh == 0, M*0, if(thresh > 0, vectorize((M ≥ thresh)*M), vectorize((M < |thresh|)*M)))
blend(M1, M2) := M1 + M2 - vectorize(M1*M2/255)
mask(M1, M2) := vectorize(M1*(M2 ≠ 0))
clip(M, low, upp) := vectorize(matmax(M*0 + low, matmin(M, M*0 + upp)))
clip(M) := clip(M, 0, 255)
scale(M, low, upp) := low + ((M - min(M))*(upp - low)/(max(M) - min(M)))
scale(M) := scale(M, 0, 255)
subcolor(M, ir, jr, ic, jc) := augment(submatrix(M, ir, jr, ic, jc), submatrix(M, ir, jr, cols(M)/3 + ic, cols(M)/3 + jc), submatrix(M, ir, jr, 2*cols(M)/3 + ic, 2*cols(M)/3 + jc))
extract(M, n) := submatrix(M, ORIGIN, ORIGIN + rows(M) - 1, ORIGIN + (n - 1)*cols(M)/3, ORIGIN + n*cols(M)/3 - 1)
extract(M) := [extract(M, 1), extract(M, 2), extract(M, 3)]
rgb_to_gray(R, G, B) := 0.299*R + 0.587*G + 0.114*B
rgb_to_gray(RGB) := rgb_to_gray(extract(RGB, 1), extract(RGB, 2), extract(RGB, 3))
colgrad_Premium(M, c) := if(c == ORIGIN, M[:, c]*0, augment(colgrad_Premium(M, c - 1), M[:, c] - M[:, c - 1]))
colgrad(M) := colgrad_Premium(M, ORIGIN + cols(M) - 1)
rowgrad(M) := transpose(colgrad(transpose(M)))
dct_Premium(M, r, c) := margin_Pep(sum(sum(M[ORIGIN + n1, ORIGIN + n2]/(sqrt(1 + δ(r, 0))*sqrt(1 + δ(c, 0)))*cos(π*(2*n1 + 1)*r/(2*rows(M)))*cos(π*(2*n2 + 1)*c/(2*cols(M))), n2 = 0 .. cols(M) - 1), n1 = 0 .. rows(M) - 1), TOL^2, 0)
idct_Premium(M, r, c) := margin_Pep(sum(sum(M[ORIGIN + n1, ORIGIN + n2]/(sqrt(1 + δ(n1, 0))*sqrt(1 + δ(n2, 0)))*cos(π*n1*(2*r + 1)/(2*rows(M)))*cos(π*n2*(2*c + 1)/(2*cols(M))), n2 = 0 .. cols(M) - 1), n1 = 0 .. rows(M) - 1), TOL^2, 0)
dct(M) := 2*colOp_Pep(M, rows(M) - 1, cols(M) - 1, dct_Premium)/sqrt(rows(M)*cols(M))
idct(M) := 2*colOp_Pep(M, rows(M) - 1, cols(M) - 1, idct_Premium)/sqrt(rows(M)*cols(M))
dht_Premium(M, r, c) := margin_Pep(sum(M[ORIGIN + k]*(cos(2*π*r*k/length(M)) + sin(2*π*r*k/length(M))), k = 0 .. length(M) - 1), TOL^2, 0)
dht(v) := rowOp_Pep(v, length(v) - 1, ORIGIN, dht_Premium)/length(v)
idht(v) := rowOp_Pep(v, length(v) - 1, ORIGIN, dht_Premium)
dft_Premium(M, r, c) := margin_Pep(sum(sum(M[ORIGIN + n1, ORIGIN + n2]*e^(-2i*π*r*n1/rows(M))*e^(-2i*π*c*n2/cols(M)), n2 = 0 .. cols(M) - 1), n1 = 0 .. rows(M) - 1), TOL^2, 0)
dft(A) := colOp_Pep(A, rows(A) - 1, cols(A) - 1, dft_Premium)
idft_Premium(M, r, c) := margin_Pep(sum(sum(M[ORIGIN + n1, ORIGIN + n2]*e^(2i*π*r*n1/rows(M))*e^(2i*π*c*n2/cols(M)), n2 = 0 .. cols(M) - 1), n1 = 0 .. rows(M) - 1), TOL^2, 0)
idft(Z) := colOp_Pep(Z, rows(Z) - 1, cols(Z) - 1, idft_Premium)/(rows(Z)*cols(Z))
# Differential equations
NewPoint(t, y, f, h, k) := if(k == 0, y + (NewPoint(t, y, f, h, 1) + 2*(NewPoint(t, y, f, h, 2) + NewPoint(t, y, f, h, 3)) + NewPoint(t, y, f, h, 4))/6, if(k == 1, h*f(t, y), if(k == 2, h*f(t + h/2, y + NewPoint(t, y, f, h, 1)/2), if(k == 3, h*f(t + h/2, y + NewPoint(t, y, f, h, 2)/2), h*f(t + h, y + NewPoint(t, y, f, h, 3))))))
rkFixed(t0, y0, f, h, i) := if(i == 0, augment(NewPoint(t0, y0, f, h, 0)), augment(rkFixed(t0, y0, f, h, i - 1), NewPoint(t0 + i*h, rkFixed(t0, y0, f, h, i - 1)[:, ORIGIN + i - 1], f, h, 0)))
rkfixed(y0, tbeg, tend, n, f) := if(n ≤ 20, augment(matrix(|n| + 1, 1, max)*(tend - tbeg)/|n| + tbeg, transpose(augment(y0, rkFixed(tbeg, y0, f, (tend - tbeg)/|n|, |n| - 1)))), error(concat("This may take about ", num2str(round([time(0); rkFixed(tbeg, y0, f, (tend - tbeg)/|12|, |12| - 1)[ORIGIN, ORIGIN]; time(0)]*[-1; 0; 1]*2^(n - 12))), " seconds. Call rkfixed with n =20 or less, or, if you can wait, set n= ", num2str(-|round(n)|), ".")))
# The collapsed area with function definitions is in the grey bar above this text.
# If you simply click on the grey bar with the mouse, in most cases the area will open. That's not a convenient situation to copy it. To close the area, press the little minus sign next to the top line of the area, to the left of the page margin.
# To select it (for copying) select with the mouse by marking an area starting one grid point below the grey line to half a gridpoint above the grey line. At the far left 'Area' will be shown just above the line when the area is selected. Then point to the line and press the right-hand mouse button, now you can choose 'copy' from the pop-up menu.
#
# Below are the collapsed areas with function evaluations. Each Premium Feature function and keyword is listed once in the most suitable category.
# If a collapsed area shows a grey line, then all functions of that category are implemented by a definition in the above area, or the category contains no Premium Features. If the collapsed area shows a a red line, then some or all functions called in that area show an error, mostly because they're Premium Features for which no implementing function was defined (yet).
# Once a function or keyword is considered unsuitable for implementation in the definition area, it may be disabled for evaluation (and shows grey).
# Evaluation of Premium features, by category:
# Bessel
z := transpose([-1 - 1i, -1 + 1i, -1, -1i, 0, 1i, 1, 1 + 1i, 1 - 1i])
m := 1.23
nz := z
nz[ORIGIN + 4] := 1/2
rz := transpose([-1, -0.5, 0, 0.5, 1])
pz := transpose([0, 0.5, 1])
Ai(rz) = [0.535362; 0.454994; 0.354782; 0.231959; 0.135011]
Ai.sc(rz) = [0.420734 - 0.331052i; 0.442413 - 0.106253i; 0.354782; 0.293613; 0.262965]
Bi(rz) = [0.104246; 0.380126; 0.615129; 0.854101; 1.20757]
Bi.sc(rz) = [0.104246; 0.380126; 0.615129; 0.674754; 0.619988]
DAi(rz) = [-0.018025; -0.196913; -0.265216; -0.219353; -0.163807]
DAi.sc(rz) = [-0.0141656 + 0.0111461i; -0.191469 + 0.0459843i; -0.265216; -0.277657; -0.319052]
DBi(rz) = [0.586077; 0.513007; 0.440516; 0.552959; 0.923525]
DBi.sc(rz) = [0.586077; 0.513007; 0.440516; 0.436846; 0.474153]
bei(m, rz) = [-0.307942; -0.141085; 0; 0.0370549; 0.0500259]
ber(m, rz) = [0.273646; 0.103998; 0; -0.171311; -0.408911]
js(m, z) = [-0.411957 - 0.0172404i; -0.411957 + 0.0172404i; 0.1814 + 0.159925i; -0.104615 - 0.276855i; 0; -0.104615 + 0.276855i; 0.24183; 0.297612 + 0.285365i; 0.297612 - 0.285365i]
ys(m, nz) = [-0.736242 - 0.0290968i; -0.121143 - 0.72679i; 1.08936; 0.208818 + 0.394389i; -3.10805 - 2.74012i; 0.417451 + 0.157742i; -0.80983 - 0.713961i; -0.571505 + 0.46506i; 0.389764 - 0.625286i]
H1(m, z) = [-1.36194 + 0.255354i; 0.0919709 + 0.25595i; 0.864252 + 0.431212i; 0.142648 - 0.689231i; 0; -0.470228 + 0.177684i; 0.363119 - 0.891598i; -0.100274 - 0.252812i; 1.0525 - 1.0931i]
H1.sc(m, z) = [-0.349755 - 0.370846i; -0.450371 + 0.586282i; 0.104105 + 0.960228i; 0.0524773 - 0.253554i; 0; -1.27821 + 0.482996i; -0.554059 - 0.787287i; -0.725543 - 0.141941i; -0.12918 - 0.543083i]
H2(m, z) = [0.0919709 - 0.25595i; -1.36194 - 0.255354i; -1.40901 - 0.911482i; -0.470228 - 0.177684i; 0; 0.142648 + 0.689231i; 0.363119 + 0.891598i; 1.0525 + 1.0931i; -0.100274 + 0.252812i]
H2.sc(m, z) = [-0.450371 - 0.586282i; -0.349755 + 0.370846i; -1.52828 + 0.693166i; -1.27821 - 0.482996i; 0; 0.0524773 + 0.253554i; -0.554059 + 0.787287i; -0.12918 + 0.543083i; -0.725543 + 0.141941i]
I0(z) = [0.937608 + 0.49653i; 0.937608 - 0.49653i; 1.26607; 0.765198; 1; 0.765198; 1.26607; 0.937608 + 0.49653i; 0.937608 - 0.49653i]
I0.sc(z) = [0.344927 + 0.182663i; 0.344927 - 0.182663i; 0.46576; 0.765198; 1; 0.765198; 0.46576; 0.344927 + 0.182663i; 0.344927 - 0.182663i]
I1(z) = [-0.365028 - 0.61416i; -0.365028 + 0.61416i; -0.565159; -0.440051i; 0; 0.440051i; 0.565159; 0.365028 + 0.61416i; 0.365028 - 0.61416i]
I1.sc(z) = [-0.134286 - 0.225937i; -0.134286 + 0.225937i; -0.20791; -0.440051i; 0; 0.440051i; 0.20791; 0.134286 + 0.225937i; 0.134286 - 0.225937i]
In(m, z) = [-0.561316 - 0.296865i; -0.561316 + 0.296865i; -0.34758 - 0.306433i; -0.119587 - 0.318633i; 0; -0.119587 + 0.318633i; 0.463371; 0.224729 + 0.593887i; 0.224729 - 0.593887i]
In.sc(m, z) = [-0.206497 - 0.10921i; -0.206497 + 0.10921i; -0.127867 - 0.11273i; -0.119587 - 0.318633i; 0; -0.119587 + 0.318633i; 0.170465; 0.0826734 + 0.218479i; 0.0826734 - 0.218479i]
J0(z) = [0.937608 - 0.49653i; 0.937608 + 0.49653i; 0.765198; 1.26607; 1; 1.26607; 0.765198; 0.937608 - 0.49653i; 0.937608 + 0.49653i]
J0.sc(z) = [0.344927 - 0.182663i; 0.344927 + 0.182663i; 0.765198; 0.46576; 1; 0.46576; 0.765198; 0.344927 - 0.182663i; 0.344927 + 0.182663i]
J1(z) = [-0.61416 - 0.365028i; -0.61416 + 0.365028i; -0.440051; -0.565159i; 0; 0.565159i; 0.440051; 0.61416 + 0.365028i; 0.61416 - 0.365028i]
J1.sc(z) = [-0.225937 - 0.134286i; -0.225937 + 0.134286i; -0.440051; -0.20791i; 0; 0.20791i; 0.440051; 0.225937 + 0.134286i; 0.225937 - 0.134286i]
Jn(m, z) = [-0.634984 - 0.000297875i; -0.634984 + 0.000297875i; -0.27238 - 0.240135i; -0.16379 - 0.433458i; 0; -0.16379 + 0.433458i; 0.363119; 0.476111 + 0.420146i; 0.476111 - 0.420146i]
Jn.sc(m, z) = [-0.233598 - 0.000109582i; -0.233598 + 0.000109582i; -0.27238 - 0.240135i; -0.060255 - 0.15946i; 0; -0.060255 + 0.15946i; 0.363119; 0.175152 + 0.154563i; 0.175152 - 0.154563i]
K0(z) = [112.04 - 20.3464i; 112.04 + 20.3464i; 189.012; -0.065827 + 1.08089i; 2.62826; -0.065827 - 1.08089i; 0.420903; 0.0801826 - 0.357188i; 0.0801826 + 0.357188i]
K0.sc(z) = [15.9714 - 38.7273i; 15.9714 + 38.7273i; 69.5336; 0.873975 + 0.639401i; 2.62826; 0.873975 - 0.639401i; 1.14413; 0.93478 - 0.341194i; 0.93478 + 0.341194i]
K1(z) = [9.36439e15 + 1.57556e16i; 9.36439e15 - 1.57556e16i; 1.44985e16; 1.1289e16i; 0; -1.1289e16i; -1.44985e16; -9.36439e15 - 1.57556e16i; -9.36439e15 + 1.57556e16i]
K1.sc(z) = [6.73863e15 + 232840670974050i; 6.73863e15 - 232840670974050i; 5.33371e15; 9.49938e15 + 6.09948e15i; 0; 9.49938e15 - 6.09948e15i; -3.94111e16; 2.22852e16 - 4.45599e16i; 2.22852e16 + 4.45599e16i]
Kn(m, z) = [-2.66656 - 1.41027i; -2.66656 + 1.41027i; -1.65119 - 1.45572i; -0.568104 - 1.51368i; 0; -0.568104 + 1.51368i; 2.20127; 1.06759 + 2.82129i; 1.06759 - 2.82129i]
Kn.sc(m, z) = [-0.966584 + 0.545146i; -0.966584 - 0.545146i; -0.60744 - 0.535531i; -1.58067 - 0.339802i; 0; -1.58067 + 0.339802i; 5.98366; -4.88532 + 6.58556i; -4.88532 - 6.58556i]
Y0(nz) = [-65.9272 + 16.7755i; -65.9272 - 16.7755i; -109.4; -0.308612 - 1.18667i; -0.4398; -0.308612 + 1.18667i; 0.0883396; 0.445489 + 0.710099i; 0.445489 - 0.710099i]
Y0.sc(nz) = [-24.2533 + 6.17134i; -24.2533 - 6.17134i; -109.4; -0.113532 - 0.43655i; -0.4398; -0.113532 + 0.43655i; 0.0883396; 0.163886 + 0.261231i; 0.163886 - 0.261231i]
Y1(nz) = [-429.778 + 77.7404i; -429.778 - 77.7404i; -613.739; -0.925415 + 0.134413i; -1.43111; -0.925415 - 0.134413i; -0.780569; -0.657614 + 0.629354i; -0.657614 - 0.629354i]
Y1.sc(nz) = [-158.107 + 28.5991i; -158.107 - 28.5991i; -613.739; -0.340441 + 0.0494476i; -1.43111; -0.340441 - 0.0494476i; -0.780569; -0.241923 + 0.231526i; -0.241923 - 0.231526i]
Yn(m, z) = [0.255652 + 0.726955i; 0.255652 - 0.726955i; 0.671347 - 1.13663i; -0.255773 - 0.306438i; 0; -0.255773 + 0.306438i; -0.891598; -0.672958 + 0.576386i; -0.672958 - 0.576386i]
Yn.sc(m, z) = [0.094049 + 0.267432i; 0.094049 - 0.267432i; 0.671347 - 1.13663i; -0.0940937 - 0.112732i; 0; -0.0940937 + 0.112732i; -0.891598; -0.247567 + 0.21204i; -0.247567 - 0.21204i]
# Complex Numbers
Z := [-1, -1i; 0, π + e*1i; 2i, 2]
arg(Z[:, ORIGIN + 1]) = [-1.5708; 0.713285; 0]
csgn(Z[ORIGIN + 1, ORIGIN + 1]) = 1
Im(Z) = [0, -1; 0, 2.71828; 2, 0]
Re(Z) = [-1, 0; 0, 3.14159; 0, 2]
signum(Z[:, ORIGIN]) = [-1; 1; 1i]
signum(Z[:, ORIGIN], Z[:, ORIGIN + 1]) = [-1; -1i; 3.14159 + 2.71828i; 2; 1i]
# Curve Fitting and Smoothing
X := transpose([8, 3, 4, 2, 5, 4, 12, 18, 3])
T := transpose([30, 15, 30, 10, 16, 15, 30, 60, 15])
V := transpose([2, 5, 8, 3, 4])
L := matrix(length(V), 1, max)
intercept(X, T) = 6.9777
slope(X, T) = 2.68137
stderr(X, T) = 6.46004
line(X, T) = [6.9777; 2.68137]
medfit(X, T) = [9.77778; 1.66667]
expfit(1, 2) =  # error: This is a premium feature. To use this and other premium features, please upgrade to a full license using the 'Upgrade' button.
genfit(1, 2, 3, 4) =  # error
lgsfit(1) =  # error: This function requires at least {0} arguments but is applied to {1}.
lnfit(1, 2) =  # error
logfit(1, 2, 3) =  # error
pwrfit(1, 2, 3) =  # error
sinfit(1, 2, 3) =  # error
loess(1, 2, 3) =  # error
rationalfit(1, 2, 3, 4, 5) =  # error
rationalfitnp(1, 2, 3, 4, 5) =  # error
linfit(1, 2, 3) =  # error
multidfit(1) =  # error
LeastSquaresFit(1) =  # error
confidence(1, 2, 3, 4) =  # error
polyfit([1, 2; 4, 3], [5, 6; 7, 8], 9) =  # error
polyfitc([1, 2; 4, 3], [5, 6; 7, 8], 9) =  # error
polyfitstat([1, 2; 4, 3], [5, 6; 7, 8], 9) =  # error
cspline(1, 2) =  # error
lspline(1, 2) =  # error
pspline(1, 2) =  # error
transpose(medsmooth(V, 3)) = [2, 5, 5, 4, 4]
Bicubic2D(1, 2, 3, 4, 5) =  # error
transpose(ksmooth(L, V, 3)) = [3.69835, 4.83551, 5.32196, 4.70857, 4.07694]
# Statistics
Data := transpose([
    1, 2, 3, 4, 5, 6, 7, 8, 9, 10;
    0.1, -0.86, -1.075, -1.16, -1.53, -2.72, -2.64, -2.91, -3.58, -3.7;
    0.4, 0.72, 1.1, 1.45, 1.8, 2.17, 2.4, 2.8, 3.2, 3.4
])
corr(Data[:, ORIGIN + 1], Data[:, ORIGIN + 2]) = -0.980848
cvar(Data[:, ORIGIN + 1], Data[:, ORIGIN + 2]) = -1.15943
gmean(Data[:, ORIGIN + 2]) = 1.6285
hmean(Data[:, ORIGIN + 2]) = 1.26832
mean(Data[:, ORIGIN + 2]) = 1.944
median(Data[:, ORIGIN + 2]) = 1.985
percentile(Data[:, ORIGIN + 2], 0.27) = 1.0886
mode([3; 3; 4]) = 3
stdev(Data[:, ORIGIN + 2]) = 0.977161
Stdev(Data[:, ORIGIN + 2]) = 1.03002
var(Data[:, ORIGIN + 2]) = 0.954844
Var(Data[:, ORIGIN + 2]) = 1.06094
kurt(Data[:, ORIGIN + 2]) = -0.936156
skew(Data[:, ORIGIN + 2]) = -0.0590227
kendltau(1, 2) =  # error
kendltau2(1) =  # error
hist(3, Data[:, 2]) = [3; 3; 4]
histogram(3, Data[:, 2]) = [0.9, 3; 1.9, 3; 2.9005, 4]
pareto(["One", 1; "Two", 2]) =  # error
contingtbl(1) =  # error
Spear(1, 2) =  # error
Ftest(1, 2) =  # error
DWS(1) =  # error
qqplot(1) =  # error
# Data Analysis
M := [1, 2, 3; 4, 5, 6; 7, 8, 9]
I := transpose([[1; 2], [0; 1]])
V := transpose([2, 5, 8, 3, 4])
markNaN(M, I) = [1, NaN, 3; 4, 5, NaN; 7, 8, 9]
matchNaN(markNaN(M, I)) = [[0; 1]; [1; 2]]
filterNaN(markNaN(M, I)) = [7, 8, 9]
trim(M, 2) = [1, 2, 3; 4, 5, 6]
transpose(expsmooth(V, 2)) = [2, 8, 8, -2, 10]
Grubbs(1, 2) =  # error
GrubbsClassic(1, 2) =  # error
interp(1, 2, 3, 4) =  # error
loadings(1) =  # error
localmax(1) =  # error
localmin(1) =  # error
transpose(movavg(V, 2)) = [2, 3.5, 6.5, 5.5, 3.5]
Nipals(1) =  # error
Nipals2(1, 2) =  # error
PCAeigenvals([1; 2]) =  # error
PCAvariance([1; 2]) =  # error
polycoeff([1; 2], [3; 4]) =  # error
polyint([1; 2], [3; 4], 5) =  # error
polyiter([1; 2], [3; 4], 5, 6, 7) =  # error
predict([1; 2], 1, 2) =  # error
rationalint(1, 2, 3) =  # error
scores(1) =  # error
supsmooth(1, 2) =  # error
Thiele(1, 2, 3) =  # error
Thielecoeff(1, 2) =  # error
ThreeSigma(1) =  # error
transpose(VSmooth(V, 2)) = [2, 5, 5, 4, 4]
# Design of Experiments
anova(1, 2) =  # error
doelabel(1, 2) =  # error
effects(1, 2) =  # error
effectsgraph(1) =  # error
foldover(1) =  # error
fractalias(1, 2) =  # error
fractfact(1, 2) =  # error
fractresol(1) =  # error
fractruns(1) =  # error
fullfact(1) =  # error
montecarlo(1) =  # error
block(1, 2) =  # error
mtaguchi(1, 2, 3, 4) =  # error
plackettburman(1) =  # error
quickscreen(1, 2) =  # error
LogNormal(1) = [0.6447]
Normal(1) = [-0.679406]
Uniform(1) = [2.52594]
Weibull(1) = [1.19077]
randomize(1) =  # error
taguchi(1, 2) =  # error
# Differential Equations
f(t, y) := -t/y
Adams(1, 2, 3, 4) =  # error
AdamsBDF(1, 2, 3, 4) =  # error
BDF(1, 2, 3) =  # error
Bulstoer(1) =  # error
bvalfit(1) =  # error
Jacob(1) =  # error
multigrid(1, 2) =  # error
numol(1) =  # error
Radau(1, 2, 3, 4, 5) =  # error
relax(1, 2, 3, 4, 5, 6, 7, 8) =  # error
Rkadapt(1) =  # error
rkfixed(1, 0, 1, 5, f) = [0, 1; 0.2, 0.979795; 0.4, 0.916511; 0.6, 0.799985; 0.8, 0.5999; 1, 0.0679566]
sbval(1, 2) =  # error
statespace(1) =  # error
Stiffb(1) =  # error
Stiffr(1) =  # error
# Solving
M := [1, 2, 4; 3, 5, 7; 6, 8, 9]
v := [-1; 2; 6]
c := transpose([24, 14, -13, 2])
lsolve(M, v) = [-0.6; 3; -1.6]
polyroots(c) = [-0.886001; 3.38599; 3.99993]
# The following are keywords, cannot be implemented with functions
find(1) =  # error: This function is misplaced. Move it to a solve block with one solve block function only.; disabled
odesolve(1) =  # error: This variable is undefined. Check that the label is set correctly.; disabled
minerr(1) =  # error; disabled
maximize(1) =  # error; disabled
minimize(1) =  # error; disabled
# Expression Type (all functions are non-premium)
# File Access
READBMP(".") =  # error
READRGB(".") =  # error
READ_IMAGE(".") =  # error
READ_BLUE(".") =  # error
READ_GREEN(".") =  # error
READ_RED(".") =  # error
READ_HLS(".") =  # error
READ_HLS_SAT(".") =  # error
READ_HSV(".") =  # error
READ_HSV_SAT(".") =  # error
READ_HUE(".") =  # error
READ_LIGHT(".") =  # error
READ_VALUE(".") =  # error
WRITEBMP(".", 1) =  # error
WRITERGB(".", 1) =  # error
WRITE_HLS(".", 1) =  # error
WRITE_HSV(".", 1) =  # error
# Finance (all functions are non-premium)
# Fourier Transform
V := transpose([1, -1, 1])
cpt(1, 2) =  # error
dft(V) = [1; 1 + 1.73205i; 1 - 1.73205i]
idft(V) = [0.333333; 0.333333 - 0.57735i; 0.333333 + 0.57735i]
dftr(1) =  # error
idftr(1) =  # error
# Graphing
Z := [-1; 2; 3]
v := [-2; 3]
boxbehnken(1) =  # error
boxplot(1) =  # error: This value must be a vector.
boxplotgraph(1) =  # error
boxwilson(1) =  # error
CreateMesh(1) =  # error
CreateSpace(1) =  # error
cyl2xyz(Z[ORIGIN], Z[ORIGIN + 1], Z[ORIGIN + 2]) = [0.416147; -0.909297; 3]
cyl2xyz(Z) = [0.416147; -0.909297; 3]
xyz2cyl(Z[ORIGIN], Z[ORIGIN + 1], Z[ORIGIN + 2]) = [2.23607; 2.03444; 3]
xyz2cyl(Z) = [2.23607; 2.03444; 3]
sph2xyz(Z[ORIGIN], Z[ORIGIN + 1], Z[ORIGIN + 2]) = [0.0587266; -0.12832; 0.989992]
sph2xyz(Z) = [0.0587266; -0.12832; 0.989992]
xyz2sph(Z[ORIGIN], Z[ORIGIN + 1], Z[ORIGIN + 2]) = [3.74166; 2.03444; 0.640522]
xyz2sph(Z) = [3.74166; 2.03444; 0.640522]
pol2xy(v[ORIGIN], v[ORIGIN + 1]) = [1.97998; -0.28224]
pol2xy(v) = [1.97998; -0.28224]
xy2pol(v[ORIGIN], v[ORIGIN + 1]) = [3.60555; 2.1588]
xy2pol(v) = [3.60555; 2.1588]
# Hyperbolic (all functions are non-premium)
# Image Processing
I := [1, 2, 3, 4; 5, 6, 7, 8; 12, 11, 10, 9; 16, 15, 14, 13]
S := [65, 66; 68, 67]
M := [1, 1, 1, 1; 1, 0, 0, 1; 1, 0, 0, 1; 1, 1, 1, 1]
P := augment(I, transpose(I), M)
and(I, transpose(I) - 4) = [0, 1, 3, 4; 0, 2, 7, 8; 0, 3, 6, 9; 0, 4, 5, 9]
or(I, transpose(I)*20) = [20, 100, 240, 255; 40, 120, 220, 255; 60, 140, 200, 255; 80, 160, 180, 255]
horzflip(I) = [4, 3, 2, 1; 8, 7, 6, 5; 9, 10, 11, 12; 13, 14, 15, 16]
vertflip(I) = [16, 15, 14, 13; 12, 11, 10, 9; 5, 6, 7, 8; 1, 2, 3, 4]
equalize(I) = [15, 31, 47, 63; 79, 95, 111, 127; 191, 175, 159, 143; 255, 239, 223, 207]
invertimage(I) = [254, 253, 252, 251; 250, 249, 248, 247; 243, 244, 245, 246; 239, 240, 241, 242]
blend(I, vertflip(I)) = [
    16.9373, 16.8824, 16.8353, 16.7961;
    16.7647, 16.7412, 16.7255, 16.7176;
    16.7647, 16.7412, 16.7255, 16.7176;
    16.9373, 16.8824, 16.8353, 16.7961
]
mask(I, M) = [1, 2, 3, 4; 5, 0, 0, 8; 12, 0, 0, 9; 16, 15, 14, 13]
threshold(equalize(I), 128) = [0, 0, 0, 0; 0, 0, 0, 0; 191, 175, 159, 143; 255, 239, 223, 207]
clip(I) = [1, 2, 3, 4; 5, 6, 7, 8; 12, 11, 10, 9; 16, 15, 14, 13]
scale(I) = [0, 17, 34, 51; 68, 85, 102, 119; 187, 170, 153, 136; 255, 238, 221, 204]
extract(P, 3) = [1, 1, 1, 1; 1, 0, 0, 1; 1, 0, 0, 1; 1, 1, 1, 1]
extract(P) = [[1, 2, 3, 4; 5, 6, 7, 8; 12, 11, 10, 9; 16, 15, 14, 13], [1, 5, 12, 16; 2, 6, 11, 15; 3, 7, 10, 14; 4, 8, 9, 13], [1, 1, 1, 1; 1, 0, 0, 1; 1, 0, 0, 1; 1, 1, 1, 1]]
subcolor(P, 1, 2, 1, 2) = [6, 7, 6, 11, 0, 0; 11, 10, 7, 10, 0, 0]
colgrad(I) = [0, 1, 1, 1; 0, 1, 1, 1; 0, -1, -1, -1; 0, -1, -1, -1]
rowgrad(I) = [0, 0, 0, 0; 4, 4, 4, 4; 7, 5, 3, 1; 4, 4, 4, 4]
rgb_to_gray(P) = [
    1, 3.647, 8.055, 10.702;
    2.783, 5.316, 8.55, 11.311;
    5.463, 7.398, 8.86, 11.023;
    7.246, 9.295, 9.583, 11.632
]
dct(I) = [34, 0, 0, 0; -17.8435, -4.12132, 0, -0.292893; 0, 0, 0, 0; -1.2681, 1.70711, 0, 0.12132]
idct(I) = [
    28.0623, -6.42343, 5.65806, 0.895016;
    -23.3452, 0.413206, -4.26096, -2.00607;
    7.11267, -1.58218, 1.42994, 0.238595;
    -3.05187, 1.44854, -0.683175, 0.0945505
]
dct(idct(I)) = [1, 2, 3, 4; 5, 6, 7, 8; 12, 11, 10, 9; 16, 15, 14, 13]
addnoise(1, 2, 3) =  # error
centsmooth(1) =  # error
binarize(1, 2) =  # error
center(1) =  # error
canny(1, 2, 3, 4) =  # error
close(1, 2, 3) =  # error
open(1, 2, 3) =  # error
compgrad(1) =  # error
concomp(1, 2, 3) =  # error
cnvxhull(1, 2) =  # error
dilate(1) =  # error
distform(1, 2) =  # error
erode(1) =  # error
getnoise(1) =  # error
freichen(1) =  # error
funconv(1, 2) =  # error
funcdeconv(1, 2) =  # error
funmap(1, 2) =  # error
gray_close(1, 2) =  # error
gray_dilate(1, 2, 3, 4) =  # error
levelmap(1, 2) =  # error
gray_open(1, 2) =  # error
gray_erode(1, 2, 3, 4) =  # error
matconv(1, 2) =  # error
matdeconv(1, 2) =  # error
hist2d(1, 2, 3) =  # error
imhist(1, 2) =  # error
imhist2(1, 2) =  # error
wave2d(1, 2) =  # error
iwave2d(1, 2) =  # error
wavescale(1, 2, 3, 4) =  # error
gray_to_rgb(1, 2) =  # error
hls_to_rgb(1, 2) =  # error
hsv_to_rgb(1, 2) =  # error
kirsch(1) =  # error
moment_invariant(1) =  # error
prewitt([1, 2; 3, 4]) =  # error
putregion([1, 2; 3, 4], [1, 2; 3, 4], 1, 2) =  # error
quantfilt(1, 2, 3) =  # error
reg_grow(1, 2, 3, 4) =  # error
replace(1, 2, 3) =  # error
rgb_to_hls(1) =  # error
rgb_to_hsv(1) =  # error
rgb_to_ycbcr(1) =  # error
rgb_to_yiq(1) =  # error
roberts(1) =  # error
robinson3(1) =  # error
robinson5(1) =  # error
rotate(1, 2) =  # error
shape_features(1) =  # error
skeleton(1) =  # error
sobel(1) =  # error
thin(1, 2) =  # error
translate(1, 2, 3, 4) =  # error
trim(1, 2) =  # error: This value must be a positive integer.
wiener2d(1, 2, 3) =  # error
ycbcr_to_rgb(1) =  # error
yiq_to_rgb(1) =  # error
zoom(1, 2, 3) =  # error
# Interpolation and Prediction
Binterp(1, 2) =  # error
bspline(1, 2, 3, 4) =  # error
Bspline(1, 2) =  # error
linterp([1; 2; 3], [4; 5; 6], 3.5) = 6.5
Spline2(1) =  # error
# Log and Exponential (all functions are non-premium)
# Number Theory/Combinatorics (all functions are non-premium)
# Piecewise Continuous (all functions are non-premium)
# Probability Distribution
# Probability density
dbeta(.1, 2, 3) = 0.972
dbinom(1, 2, .3) = 0.42
dcauchy(1, 2, 3) = 0.095493
dchisq(1, 2) = 0.303265
dexp(1, 2) = 0.270671
dF(1, 2, 3) = 0.262218
dgamma(1, 2) = 0.367879
dgeom(1, .2) = 0.16
dhypergeom(1, 2, 3, 4) = 0.4
dlnorm(1, 2, 3) = 0.106483
dlogis(1, 2, 3) = 0.0810607
dnbinom(1, 2, .3) = 0.126
dnorm(1, 2, 3) = 0.125794
dpois(1, 2) = 0.270671
dt(1, 2) = 0.185802
dunif(1, .2, 3) = 0.357143
dweibull(1, 2) = 0.735759
# Cumulative probability distribution
pbeta(1, 2, 3) = 1
pbinom(1, 2, .3) = 0.91
pcauchy(1, 2, 3) = 0.397584
pchisq(1, 2) = 0.393469
pexp(1, 2) = 0.864665
pF(1, 2, 3) = 0.503308
pgamma(1, 2) = 0.264241
pgeom(1, .2) = 0.36
phypergeom(1, 2, 3, 4) = 0.4
plnorm(1, 2, 3) = 0.252493
plogis(1, 2, 3) = 0.41743
pnbinom(1, 2, .3) = 0.216
pnorm(1, 2, 3) = 0.369441
ppois(1, 2) = 0.406006
pt(1, 2) = 0.761429
punif(1, .2, 3) = 0.285714
pweibull(1, 2) = 0.632121
cnorm(1) = 0.841345
# Inverse cumulative probability distribution
qbeta(1, 2, 3) = 1
qbinom(.91, 2, .3) = 1.99805
qcauchy(.398, 2, 3) = 1.00436
qchisq(.393, 2) = 0.998453
qexp(.865, 2) = 1.00124
qF(.535, 2, 3) = 1.12867
qgamma(.264, 2) = 0.999345
qgeom(.36, .2) = 2
qhypergeom(.4, 2, 3, 4) = 1
qlnorm(.072, 2, 3) = 0.0921898
qlogis(.417, 2, 3) = 0.994697
qnbinom(.216, 2, .3) = 1
qnorm(.369, 2, 3) = 0.996491
qpois(.406, 2) = 1.00085
qt(.789, 2) = 1.16084
qunif(.171, .2, 3) = 0.6788
qweibull(0.632, 2) = 0.999836
# Random numbers (are all Express features)
# Signal Processing
n := 3
S := transpose([1, 2, 3, 2, 1, 2])
# Signal and System
phase([1; 2]) =  # error
phasecor([1; 2]) =  # error
gaussn(n) = [-0.951466; -1.68568; 0.0435303]
onefn(1) =  # error
whiten(3) = [0.375968; 0.4559; 0.0393415]
quantize(1, 2) =  # error
covar(1, 2) =  # error
# Spectral Analysis
# Signal Windowing
n := 5
blackman(n) = [0; 0.34; 1; 0.34; 0]
cheby(n, n*10) = [0.205494; 0.701046; 1; 0.701046; 0.205494]
costaper(n, 2/n) = [0.75; 1; 1; 1; 0.75]
gaussian(n, n) = [3.72665e-6; 0.0439369; 1; 0.0439369; 3.72665e-6]
hamming(n) = [0.08; 0.54; 1; 0.54; 0.08]
hanning(n) = [0; 0.5; 1; 0.5; 0]
kaiser(n, n) = [0.0367109; 0.552852; 1; 0.552852; 0.0367109]
nuttall(n) = [0.0003628; 0.226982; 1; 0.226982; 0.0003628]
taprect(n) = [0; 1; 1; 1; 0]
triangular(n) = [0; 0.5; 1; 0.5; 0]
# Spectral analysis
coherence(1, 2) =  # error
cspectrum(1) =  # error
pspectrum(1, 2, 3) =  # error
snr(1) =  # error
ccepstrum(1) =  # error
cepstrum(1) =  # error
chirpz(1, 2, 3, 4) =  # error
music(1, 2) =  # error
# Digital Filtering
gain([1, 1; 0, 2], 0.1) = 0.317874 + 0.142734i
fftfilt(1, 2) =  # error
response(1, 2, 3) =  # error
bandpass(1, 2, 3) =  # error
bandstop(1, 2, 3) =  # error
highpass(1, 2) =  # error
lowpass(1, 2) =  # error
remez(1, 2, 3, 4) =  # error
bessel(1, 2) = [1, 1; 0, 2]
butter(1) = [1, 1; 0, 1; 0, 0]
cheby1(1, 2) = [0.5, 0.5; 0, 1; 0, 0]
cheby2(1, 2, 3) = [0.707107, 0.707107; 0, 1; 0, 0]
iirhigh(butter(1), 0.1) = [0.754763, 1; -0.754763, -0.509525; 0, 0]
iirlow(butter(1), 0.1) = [0.245237, 1; 0.245237, -0.509525; 0, 0]
iirpass(butter(1), 0.1, 0.4) = [0.579192, 1; 0, 0; -0.579192, -0.158384; 0, 0; 0, 0]
iirstop(butter(1), 0.1, 0.4) = [0.420808, 1; 0, 0; 0.420808, -0.158384; 0, 0; 0, 0]
filtfilt(1, 2) =  # error
grpdelay(1, 2) =  # error
multirate(1, 2, 3) =  # error
resample(1, 2, 3) =  # error
upsample(1, 2) =  # error
# Time series analysis
detrend(1) =  # error
burg(1, 2) =  # error
yulew(1, 2) =  # error
lcorr(1, 2) =  # error
plcorr([1; 2]) =  # error
# Additional transforms
dht(1) =  # error
idht(1) =  # error
hilbert(1) =  # error
isintr(S) = [0; 2.48803; 0.57735; 0.666667; -0.57735; 0.178633]
sintr(S) = [0; 7.4641; 1.73205; 2; -1.73205; 0.535898]
isintr(sintr(S)) = [0; 2; 3; 2; 1; 2]
walsh(1, 2) =  # error
# Joint time-frequency analysis
stft(1) =  # error
timecorr(1) =  # error
timefreq(1) =  # error
# Sorting (all functions are non-premium)
# Special
Z := [1 - 2i; 0.1; 2 + 1i]
i := ORIGIN, ORIGIN + 1 .. last(Z)
n := 3
p := 1/π
erf(Z) = [-0.536644 + 5.04914i; 0.112463; 1.00361 - 0.011259i]
erfc(Z) = [1.53664 - 5.04914i; 0.887537; -0.00360635 + 0.011259i]
Γ(Z[i]) = [0.160019 - 0.0105583i; 9.512; 0.641815 + 0.288202i]
lnΓ(Z[i]) = [-1.83029 - 0.0658857i; 2.25255; -0.351612 + 0.422056i]
ibeta(p, Re(Z[i]), Re(Z[last(Z) - i])) = [0.535299; 0.466384; 0.101321]
Psi(Z[i]) = [0.71459 - 1.31881i; -10.4269; 0.593652 + 0.575677i]
Tcheb(n, Re(Z)) = [1; -0.296; 26]
Ucheb(n, Re(Z)) = [4; -0.392; 56]
Her(n, Re(Z)) = [-4; -1.192; 40]
Lag(n, Re(Z[i])) = [-0.666667; 0.714833; -0.333333]
Leg(n, Re(Z[i])) = [1; -0.1475; 17]
Jac(n, p, 1/p, Re(Z[i])) = [1.69026; 0.914429; 54.6524]
fhyper(n/p, p, 1/p, Im(Z)/10) = [0.856128; 1; 1.1146]
mhyper(p, 1/p, Im(Z)) = [0.846672; 1; 1.12024]
# Symbolic Functions
beta(1) =  # error: You must evaluate this operator symbolically.
Δ(1) =  # error
Ei(1) =  # error
Zeta(1) =  # error
Chi(1) =  # error
Ci(1) =  # error
Si(1) =  # error
Shi(1) =  # error
denom(1) =  # error
numer(1) =  # error
fact2(1) =  # error
IsPrime(1) =  # error
FresnelC(1) =  # error
FresnelS(1) =  # error
LambertW(1) =  # error
dilog(1) =  # error
polylog(1) =  # error
hypergeom(1) =  # error  # clear.sym
# Trigonometrics (all functions are non-premium)
# Truncation and Round-Off (all functions are non-premium)
# Vector and Matrix functions
order([2; 3; 1]) = [1; 2; 0]
# Wavelets
wave(1) =  # error
iwave(1) =  # error
Bspline(1, 2) =  # error
# End of file.
